<Lems>

    <!-- Specify which component to run -->
    <Target component="Sim_L23"/>

    <!-- Include core NeuroML2 ComponentType definitions -->
    <Include file="Cells.xml"/>
    <Include file="Networks.xml"/>
    <Include file="Simulation.xml"/>

    <Include href="L23.net.nml"/>

    <Include href="L23/cADpyr229_L23_PC_5ecbf9b163_0_0.cell.nml"/>
    <Include href="L23/pas.channel.nml"/>
    <Include href="L23/Ih.channel.nml"/>
    <Include href="L23/NaTs2_t.channel.nml"/>
    <Include href="L23/SKv3_1.channel.nml"/>
    <Include href="L23/Im.channel.nml"/>
    <Include href="L23/NaTa_t.channel.nml"/>
    <Include href="L23/K_Tst.channel.nml"/>
    <Include href="L23/Nap_Et2.channel.nml"/>
    <Include href="L23/SK_E2.channel.nml"/>
    <Include href="L23/Ca_HVA.channel.nml"/>
    <Include href="L23/K_Pst.channel.nml"/>
    <Include href="L23/CaDynamics_E2_NML2.nml"/>
    <Include href="L23/Ca_LVAst.channel.nml"/>

    <Simulation id="Sim_L23" length="500ms" step="0.005ms" target="L23" seed="12345">  <!-- Note seed: ensures same random numbers used every run -->

        <Display id="soma" title="Membrane potential of soma" timeScale="1ms" xmin="-50.0" xmax="550.0" ymin="-90" ymax="50">
            <Line id="soma: v" quantity="popL23/0/cADpyr229_L23_PC_5ecbf9b163_0_0/0/v" scale="1mV" color="#6aa799" timeScale="1ms"/>
        </Display>
        <!--
        <Display id="DispPop__popHH" title="Membrane potentials of cells in popHH" timeScale="1ms" xmin="-50.0" xmax="550.0" ymin="-90" ymax="50">
            <Line id="popHH[0]: v" quantity="popHH/0/pyr_4_sym_soma/v" scale="1mV" color="#029a72" timeScale="1ms"/>
        </Display>

        <OutputFile id="Volts_file__popIzh" fileName="Sim_IClamps.popIzh.v.dat">
            <OutputColumn id="v_popIzh_0_RS_v" quantity="popIzh/0/RS/v"/>
        </OutputFile>

        <OutputFile id="Volts_file__popHH" fileName="Sim_IClamps.popHH.v.dat">
            <OutputColumn id="v_popHH_0_pyr_4_sym_soma_v" quantity="popHH/0/pyr_4_sym_soma/v"/>
        </OutputFile>
        -->
    </Simulation>

</Lems>
