<Lems>

    <!-- Specify which component to run -->
    <Target component="Sim_L23"/>

    <!-- Include core NeuroML2 ComponentType definitions -->
    <Include file="Cells.xml"/>
    <Include file="Networks.xml"/>
    <Include file="Simulation.xml"/>

    <Include href="TimedSyns.net.nml"/>

    <Include href="cADpyr229_L23_PC_5ecbf9b163_0_0.cell.nml"/>
    <Include href="PassiveCell.cell.nml"/>
    <Include href="pas.channel.nml"/>
    <Include href="Ih.channel.nml"/>
    <Include href="NaTs2_t.channel.nml"/>
    <Include href="SKv3_1.channel.nml"/>
    <Include href="Im.channel.nml"/>
    <Include href="NaTa_t.channel.nml"/>
    <Include href="K_Tst.channel.nml"/>
    <Include href="Nap_Et2.channel.nml"/>
    <Include href="SK_E2.channel.nml"/>
    <Include href="Ca_HVA.channel.nml"/>
    <Include href="K_Pst.channel.nml"/>
    <Include href="CaDynamics_E2_NML2.nml"/>
    <Include href="Ca_LVAst.channel.nml"/>

    <Simulation id="Sim_L23" length="1500ms" step="0.025ms" target="L23" seed="12345">  <!-- Note seed: ensures same random numbers used every run -->

        <Display id="soma" title="Membrane potentials" timeScale="1ms" xmin="-50.0" xmax="550.0" ymin="-90" ymax="50">
            <Line id="soma" quantity="popL23/0/cADpyr229_L23_PC_5ecbf9b163_0_0/0/v" scale="1mV" color="#6aa799" timeScale="1ms"/>
            <Line id="dend21 (basal-prox)" quantity="popL23/0/cADpyr229_L23_PC_5ecbf9b163_0_0/264/v" scale="1mV" color="#aaff00" timeScale="1ms"/>
            <Line id="dend27 (basal-dist)" quantity="popL23/0/cADpyr229_L23_PC_5ecbf9b163_0_0/340/v" scale="1mV" color="#aa5555" timeScale="1ms"/>
            <Line id="apic15 (apical-prox)" quantity="popL23/0/cADpyr229_L23_PC_5ecbf9b163_0_0/955/v" scale="1mV" color="#aa5fff" timeScale="1ms"/>
            <Line id="apic17 (apical-dist)" quantity="popL23/0/cADpyr229_L23_PC_5ecbf9b163_0_0/1035/v" scale="1mV" color="#a11fff" timeScale="1ms"/>
        </Display>

        <Display id="Pass" title="Membrane potentials of passive cells" timeScale="1ms" xmin="-50.0" xmax="550.0" ymin="-90" ymax="50">
            <Line id="0" quantity="popPassive/0/PassiveCell/v" scale="1mV" color="#029a72" timeScale="1ms"/>
            <Line id="1" quantity="popPassive/1/PassiveCell/v" scale="1mV" color="#22ee22" timeScale="1ms"/>
            <Line id="2" quantity="popPassive/2/PassiveCell/v" scale="1mV" color="#77ff77" timeScale="1ms"/>
        </Display>

        <!--
        <Display id="DispPop__popHH" title="Membrane potentials of cells in popHH" timeScale="1ms" xmin="-50.0" xmax="550.0" ymin="-90" ymax="50">
            <Line id="popHH[0]: v" quantity="popHH/0/pyr_4_sym_soma/v" scale="1mV" color="#029a72" timeScale="1ms"/>
        </Display>
        -->

        <OutputFile id="Volts_file" fileName="v.dat">
            <OutputColumn id="0" quantity="popL23/0/cADpyr229_L23_PC_5ecbf9b163_0_0/0/v"/>
            <OutputColumn id="1" quantity="popL23/0/cADpyr229_L23_PC_5ecbf9b163_0_0/264/v"/>
            <OutputColumn id="2" quantity="popL23/0/cADpyr229_L23_PC_5ecbf9b163_0_0/340/v"/>
            <OutputColumn id="3" quantity="popL23/0/cADpyr229_L23_PC_5ecbf9b163_0_0/955/v"/>
            <OutputColumn id="4" quantity="popL23/0/cADpyr229_L23_PC_5ecbf9b163_0_0/1035/v"/>
        </OutputFile>

    </Simulation>

</Lems>
