<?xml version="1.0" encoding="UTF-8"?>
<neuroml xmlns="http://www.neuroml.org/schema/neuroml2" xmlns:xsi="http://www.w3.org/2001/XMLSchema-instance" xsi:schemaLocation="http://www.neuroml.org/schema/neuroml2  https://raw.githubusercontent.com/NeuroML/NeuroML2/development/Schemas/NeuroML2/NeuroML_v2beta5.xsd" id="MainenNeuroML">

    <include href="K_ChannelML.channel.nml"/>

    <include href="LeakCond.channel.nml"/>

    <include href="Na_ChannelML.channel.nml"/>

    <cell id="MainenNeuroML">

        <notes>Complete description of cell model in neuroConstruct's internal data model, which has straightforward mapping to MorphML/NeuroML.

Note, a few fixes to the original morphology were needed:

Sections with zero start/end radius were given 0.01 um radius.
Segments with zero length had their end points shifted by 0.001 um in the x dir to create a real segment with negligible extra area.
Internal divisions (nseg) of 10 segments needed adjusting to make electrotinic length less than 0.1

There are some slight differences in simulations run with this morphology and those run with the original simulation code due to NEURON reconnecting dendrites which 'float in space', i.e. where the specified start point on a section doesn't exactly match the location it's connected to on its parent section. This reconnection seems to change the area of some segments (iseg in particular)</notes>

        <morphology id="morphology_MainenNeuroML">

            <segment id="0" name="soma__0">
                <proximal x="-161.5" y="-17.0" z="-8.0" diameter="0.02"/>
                <distal x="-161.0" y="-18.375" z="-8.0" diameter="5.25"/>
            </segment>

            <segment id="1" name="soma__1">
                <parent segment="0"/>
                <distal x="-161.0" y="-19.375" z="-8.0" diameter="7.25"/>
            </segment>

            <segment id="2" name="soma__2">
                <parent segment="1"/>
                <distal x="-159.5" y="-18.25" z="-8.0" diameter="12.5"/>
            </segment>

            <segment id="3" name="soma__3">
                <parent segment="2"/>
                <distal x="-159.0" y="-18.214" z="-8.0" diameter="13.571"/>
            </segment>

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
            <segmentGroup id="soma" neuroLexId="sao864921383">    <!--
                This group contains an unbranched set of segments, and all of the segmentGroups marked with
                neuroLexId = sao864921383 form a non-overlapping set of all of the segments.
                These segmentGroups correspond to the 'cables' of NeuroML v1.8.1. -->

                <member segment="0"/>

                <member segment="1"/>

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            </segmentGroup>

            <segmentGroup id="hill" neuroLexId="sao864921383">    <!--
                This group contains an unbranched set of segments, and all of the segmentGroups marked with
                neuroLexId = sao864921383 form a non-overlapping set of all of the segments.
                These segmentGroups correspond to the 'cables' of NeuroML v1.8.1. -->

                <!--This 'Section' has number of internal divisions (nseg) = 10-->

                <property tag="numberInternalDivisions" value="10"/>

                <member segment="16"/>

                <member segment="17"/>

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            </segmentGroup>

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
            <segmentGroup id="soma_group" neuroLexId="GO:0043025">    <!--Soma group-->

                <include segmentGroup="soma"/>
            </segmentGroup>

            <segmentGroup id="low_na_cond_dens">
                <include segmentGroup="soma"/>
                <include segmentGroup="dend2_0_"/>
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            </segmentGroup>

            <segmentGroup id="high_na_cond_dens">
                <include segmentGroup="hill"/>
                <include segmentGroup="iseg"/>
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            </segmentGroup>

            <segmentGroup id="axon_start">
                <include segmentGroup="hill"/>
                <include segmentGroup="iseg"/>
            </segmentGroup>

            <segmentGroup id="axon_group" neuroLexId="GO:0030424">    <!--Axon group-->

                <include segmentGroup="hill"/>
                <include segmentGroup="iseg"/>
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            </segmentGroup>

            <segmentGroup id="dendrite_group" neuroLexId="GO:0030425">    <!--Dendrite group-->

                <include segmentGroup="dend2_0_"/>
                <include segmentGroup="dend2_1_"/>
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            </segmentGroup>

            <segmentGroup id="dend2_0__grp">
                <include segmentGroup="dend2_0_"/>
            </segmentGroup>

            <segmentGroup id="basal">
                <include segmentGroup="dend2_0_"/>
                <include segmentGroup="dend2_1_"/>
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            </segmentGroup>

            <segmentGroup id="dend2_1__grp">
                <include segmentGroup="dend2_1_"/>
            </segmentGroup>

            <segmentGroup id="dend2_2__grp">
                <include segmentGroup="dend2_2_"/>
            </segmentGroup>

            <segmentGroup id="dend2_3__grp">
                <include segmentGroup="dend2_3_"/>
            </segmentGroup>

            <segmentGroup id="dend2_4__grp">
                <include segmentGroup="dend2_4_"/>
            </segmentGroup>

            <segmentGroup id="dend2_5__grp">
                <include segmentGroup="dend2_5_"/>
            </segmentGroup>

            <segmentGroup id="dend2_6__grp">
                <include segmentGroup="dend2_6_"/>
            </segmentGroup>

            <segmentGroup id="dend2_7__grp">
                <include segmentGroup="dend2_7_"/>
            </segmentGroup>

            <segmentGroup id="dend2_8__grp">
                <include segmentGroup="dend2_8_"/>
            </segmentGroup>

            <segmentGroup id="dend2_9__grp">
                <include segmentGroup="dend2_9_"/>
            </segmentGroup>

            <segmentGroup id="dend2_10__grp">
                <include segmentGroup="dend2_10_"/>
            </segmentGroup>

            <segmentGroup id="dend2_11__grp">
                <include segmentGroup="dend2_11_"/>
            </segmentGroup>

            <segmentGroup id="dend2_12__grp">
                <include segmentGroup="dend2_12_"/>
            </segmentGroup>

            <segmentGroup id="dend2_13__grp">
                <include segmentGroup="dend2_13_"/>
            </segmentGroup>

            <segmentGroup id="dend2_14__grp">
                <include segmentGroup="dend2_14_"/>
            </segmentGroup>

            <segmentGroup id="dend2_15__grp">
                <include segmentGroup="dend2_15_"/>
            </segmentGroup>

            <segmentGroup id="dend2_16__grp">
                <include segmentGroup="dend2_16_"/>
            </segmentGroup>

            <segmentGroup id="dend2_17__grp">
                <include segmentGroup="dend2_17_"/>
            </segmentGroup>

            <segmentGroup id="dend2_18__grp">
                <include segmentGroup="dend2_18_"/>
            </segmentGroup>

            <segmentGroup id="dend2_19__grp">
                <include segmentGroup="dend2_19_"/>
            </segmentGroup>

            <segmentGroup id="dend2_20__grp">
                <include segmentGroup="dend2_20_"/>
            </segmentGroup>

            <segmentGroup id="dend2_21__grp">
                <include segmentGroup="dend2_21_"/>
            </segmentGroup>

            <segmentGroup id="dend2_22__grp">
                <include segmentGroup="dend2_22_"/>
            </segmentGroup>

            <segmentGroup id="dend2_23__grp">
                <include segmentGroup="dend2_23_"/>
            </segmentGroup>

            <segmentGroup id="dend2_24__grp">
                <include segmentGroup="dend2_24_"/>
            </segmentGroup>

            <segmentGroup id="dend2_25__grp">
                <include segmentGroup="dend2_25_"/>
            </segmentGroup>

            <segmentGroup id="dend2_26__grp">
                <include segmentGroup="dend2_26_"/>
            </segmentGroup>

            <segmentGroup id="dend2_27__grp">
                <include segmentGroup="dend2_27_"/>
            </segmentGroup>

            <segmentGroup id="dend2_28__grp">
                <include segmentGroup="dend2_28_"/>
            </segmentGroup>

            <segmentGroup id="dend3_0__grp">
                <include segmentGroup="dend3_0_"/>
            </segmentGroup>

            <segmentGroup id="dend3_1__grp">
                <include segmentGroup="dend3_1_"/>
            </segmentGroup>

            <segmentGroup id="dend3_2__grp">
                <include segmentGroup="dend3_2_"/>
            </segmentGroup>

            <segmentGroup id="dend3_3__grp">
                <include segmentGroup="dend3_3_"/>
            </segmentGroup>

            <segmentGroup id="dend3_4__grp">
                <include segmentGroup="dend3_4_"/>
            </segmentGroup>

            <segmentGroup id="dend3_5__grp">
                <include segmentGroup="dend3_5_"/>
            </segmentGroup>

            <segmentGroup id="dend3_6__grp">
                <include segmentGroup="dend3_6_"/>
            </segmentGroup>

            <segmentGroup id="dend3_7__grp">
                <include segmentGroup="dend3_7_"/>
            </segmentGroup>

            <segmentGroup id="dend3_8__grp">
                <include segmentGroup="dend3_8_"/>
            </segmentGroup>

            <segmentGroup id="dend3_9__grp">
                <include segmentGroup="dend3_9_"/>
            </segmentGroup>

            <segmentGroup id="dend3_10__grp">
                <include segmentGroup="dend3_10_"/>
            </segmentGroup>

            <segmentGroup id="dend3_11__grp">
                <include segmentGroup="dend3_11_"/>
            </segmentGroup>

            <segmentGroup id="dend3_12__grp">
                <include segmentGroup="dend3_12_"/>
            </segmentGroup>

            <segmentGroup id="dend3_13__grp">
                <include segmentGroup="dend3_13_"/>
            </segmentGroup>

            <segmentGroup id="dend3_14__grp">
                <include segmentGroup="dend3_14_"/>
            </segmentGroup>

            <segmentGroup id="dend3_15__grp">
                <include segmentGroup="dend3_15_"/>
            </segmentGroup>

            <segmentGroup id="dend3_16__grp">
                <include segmentGroup="dend3_16_"/>
            </segmentGroup>

            <segmentGroup id="dend4_0__grp">
                <include segmentGroup="dend4_0_"/>
            </segmentGroup>

            <segmentGroup id="dend4_1__grp">
                <include segmentGroup="dend4_1_"/>
            </segmentGroup>

            <segmentGroup id="dend4_2__grp">
                <include segmentGroup="dend4_2_"/>
            </segmentGroup>

            <segmentGroup id="dend5_0__grp">
                <include segmentGroup="dend5_0_"/>
            </segmentGroup>

            <segmentGroup id="dend5_1__grp">
                <include segmentGroup="dend5_1_"/>
            </segmentGroup>

            <segmentGroup id="dend5_2__grp">
                <include segmentGroup="dend5_2_"/>
            </segmentGroup>

            <segmentGroup id="dend5_3__grp">
                <include segmentGroup="dend5_3_"/>
            </segmentGroup>

            <segmentGroup id="dend5_4__grp">
                <include segmentGroup="dend5_4_"/>
            </segmentGroup>

            <segmentGroup id="dend6_0__grp">
                <include segmentGroup="dend6_0_"/>
            </segmentGroup>

            <segmentGroup id="dend6_1__grp">
                <include segmentGroup="dend6_1_"/>
            </segmentGroup>

            <segmentGroup id="dend6_2__grp">
                <include segmentGroup="dend6_2_"/>
            </segmentGroup>

            <segmentGroup id="dend6_3__grp">
                <include segmentGroup="dend6_3_"/>
            </segmentGroup>

            <segmentGroup id="dend6_4__grp">
                <include segmentGroup="dend6_4_"/>
            </segmentGroup>

            <segmentGroup id="dend6_5__grp">
                <include segmentGroup="dend6_5_"/>
            </segmentGroup>

            <segmentGroup id="dend6_6__grp">
                <include segmentGroup="dend6_6_"/>
            </segmentGroup>

            <segmentGroup id="dend6_7__grp">
                <include segmentGroup="dend6_7_"/>
            </segmentGroup>

            <segmentGroup id="dend6_8__grp">
                <include segmentGroup="dend6_8_"/>
            </segmentGroup>

            <segmentGroup id="dend6_9__grp">
                <include segmentGroup="dend6_9_"/>
            </segmentGroup>

            <segmentGroup id="dend6_10__grp">
                <include segmentGroup="dend6_10_"/>
            </segmentGroup>

            <segmentGroup id="dend6_11__grp">
                <include segmentGroup="dend6_11_"/>
            </segmentGroup>

            <segmentGroup id="dend6_12__grp">
                <include segmentGroup="dend6_12_"/>
            </segmentGroup>

            <segmentGroup id="dend6_13__grp">
                <include segmentGroup="dend6_13_"/>
            </segmentGroup>

            <segmentGroup id="dend6_14__grp">
                <include segmentGroup="dend6_14_"/>
            </segmentGroup>

            <segmentGroup id="dend6_15__grp">
                <include segmentGroup="dend6_15_"/>
            </segmentGroup>

            <segmentGroup id="dend6_16__grp">
                <include segmentGroup="dend6_16_"/>
            </segmentGroup>

            <segmentGroup id="dend6_17__grp">
                <include segmentGroup="dend6_17_"/>
            </segmentGroup>

            <segmentGroup id="dend6_18__grp">
                <include segmentGroup="dend6_18_"/>
            </segmentGroup>

            <segmentGroup id="dend6_19__grp">
                <include segmentGroup="dend6_19_"/>
            </segmentGroup>

            <segmentGroup id="dend6_20__grp">
                <include segmentGroup="dend6_20_"/>
            </segmentGroup>

            <segmentGroup id="dend6_21__grp">
                <include segmentGroup="dend6_21_"/>
            </segmentGroup>

            <segmentGroup id="dend6_22__grp">
                <include segmentGroup="dend6_22_"/>
            </segmentGroup>

            <segmentGroup id="dend6_23__grp">
                <include segmentGroup="dend6_23_"/>
            </segmentGroup>

            <segmentGroup id="dend6_24__grp">
                <include segmentGroup="dend6_24_"/>
            </segmentGroup>

            <segmentGroup id="dend6_25__grp">
                <include segmentGroup="dend6_25_"/>
            </segmentGroup>

            <segmentGroup id="dend6_26__grp">
                <include segmentGroup="dend6_26_"/>
            </segmentGroup>

            <segmentGroup id="dend6_27__grp">
                <include segmentGroup="dend6_27_"/>
            </segmentGroup>

            <segmentGroup id="dend6_28__grp">
                <include segmentGroup="dend6_28_"/>
            </segmentGroup>

            <segmentGroup id="dend6_29__grp">
                <include segmentGroup="dend6_29_"/>
            </segmentGroup>

            <segmentGroup id="dend6_30__grp">
                <include segmentGroup="dend6_30_"/>
            </segmentGroup>

            <segmentGroup id="dend7_0__grp">
                <include segmentGroup="dend7_0_"/>
            </segmentGroup>

            <segmentGroup id="dend7_1__grp">
                <include segmentGroup="dend7_1_"/>
            </segmentGroup>

            <segmentGroup id="dend7_2__grp">
                <include segmentGroup="dend7_2_"/>
            </segmentGroup>

            <segmentGroup id="dend7_3__grp">
                <include segmentGroup="dend7_3_"/>
            </segmentGroup>

            <segmentGroup id="dend7_4__grp">
                <include segmentGroup="dend7_4_"/>
            </segmentGroup>

            <segmentGroup id="dend7_5__grp">
                <include segmentGroup="dend7_5_"/>
            </segmentGroup>

            <segmentGroup id="dend7_6__grp">
                <include segmentGroup="dend7_6_"/>
            </segmentGroup>

            <segmentGroup id="dend8_0__grp">
                <include segmentGroup="dend8_0_"/>
            </segmentGroup>

            <segmentGroup id="dend8_1__grp">
                <include segmentGroup="dend8_1_"/>
            </segmentGroup>

            <segmentGroup id="dend8_2__grp">
                <include segmentGroup="dend8_2_"/>
            </segmentGroup>

            <segmentGroup id="dend8_3__grp">
                <include segmentGroup="dend8_3_"/>
            </segmentGroup>

            <segmentGroup id="dend8_4__grp">
                <include segmentGroup="dend8_4_"/>
            </segmentGroup>

            <segmentGroup id="dend8_5__grp">
                <include segmentGroup="dend8_5_"/>
            </segmentGroup>

            <segmentGroup id="dend8_6__grp">
                <include segmentGroup="dend8_6_"/>
            </segmentGroup>

            <segmentGroup id="dend9_0__grp">
                <include segmentGroup="dend9_0_"/>
            </segmentGroup>

            <segmentGroup id="apical">
                <include segmentGroup="dend9_0_"/>
                <include segmentGroup="dend9_1_"/>
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            </segmentGroup>

            <segmentGroup id="dend9_1__grp">
                <include segmentGroup="dend9_1_"/>
            </segmentGroup>

            <segmentGroup id="dend9_2__grp">
                <include segmentGroup="dend9_2_"/>
            </segmentGroup>

            <segmentGroup id="dend9_3__grp">
                <include segmentGroup="dend9_3_"/>
            </segmentGroup>

            <segmentGroup id="dend9_4__grp">
                <include segmentGroup="dend9_4_"/>
            </segmentGroup>

            <segmentGroup id="dend9_5__grp">
                <include segmentGroup="dend9_5_"/>
            </segmentGroup>

            <segmentGroup id="dend9_6__grp">
                <include segmentGroup="dend9_6_"/>
            </segmentGroup>

            <segmentGroup id="dend9_7__grp">
                <include segmentGroup="dend9_7_"/>
            </segmentGroup>

            <segmentGroup id="dend9_8__grp">
                <include segmentGroup="dend9_8_"/>
            </segmentGroup>

            <segmentGroup id="dend9_9__grp">
                <include segmentGroup="dend9_9_"/>
            </segmentGroup>

            <segmentGroup id="dend9_10__grp">
                <include segmentGroup="dend9_10_"/>
            </segmentGroup>

            <segmentGroup id="dend9_11__grp">
                <include segmentGroup="dend9_11_"/>
            </segmentGroup>

            <segmentGroup id="dend9_12__grp">
                <include segmentGroup="dend9_12_"/>
            </segmentGroup>

            <segmentGroup id="dend9_13__grp">
                <include segmentGroup="dend9_13_"/>
            </segmentGroup>

            <segmentGroup id="dend9_14__grp">
                <include segmentGroup="dend9_14_"/>
            </segmentGroup>

            <segmentGroup id="dend9_15__grp">
                <include segmentGroup="dend9_15_"/>
            </segmentGroup>

            <segmentGroup id="dend9_16__grp">
                <include segmentGroup="dend9_16_"/>
            </segmentGroup>

            <segmentGroup id="dend9_17__grp">
                <include segmentGroup="dend9_17_"/>
            </segmentGroup>

            <segmentGroup id="dend9_18__grp">
                <include segmentGroup="dend9_18_"/>
            </segmentGroup>

            <segmentGroup id="dend9_19__grp">
                <include segmentGroup="dend9_19_"/>
            </segmentGroup>

            <segmentGroup id="dend9_20__grp">
                <include segmentGroup="dend9_20_"/>
            </segmentGroup>

            <segmentGroup id="dend9_21__grp">
                <include segmentGroup="dend9_21_"/>
            </segmentGroup>

            <segmentGroup id="dend9_22__grp">
                <include segmentGroup="dend9_22_"/>
            </segmentGroup>

            <segmentGroup id="dend9_23__grp">
                <include segmentGroup="dend9_23_"/>
            </segmentGroup>

            <segmentGroup id="dend9_24__grp">
                <include segmentGroup="dend9_24_"/>
            </segmentGroup>

            <segmentGroup id="dend9_25__grp">
                <include segmentGroup="dend9_25_"/>
            </segmentGroup>

            <segmentGroup id="dend9_26__grp">
                <include segmentGroup="dend9_26_"/>
            </segmentGroup>

            <segmentGroup id="dend9_27__grp">
                <include segmentGroup="dend9_27_"/>
            </segmentGroup>

            <segmentGroup id="dend9_28__grp">
                <include segmentGroup="dend9_28_"/>
            </segmentGroup>

            <segmentGroup id="dend9_29__grp">
                <include segmentGroup="dend9_29_"/>
            </segmentGroup>

            <segmentGroup id="dend9_30__grp">
                <include segmentGroup="dend9_30_"/>
            </segmentGroup>

            <segmentGroup id="dend9_31__grp">
                <include segmentGroup="dend9_31_"/>
            </segmentGroup>

            <segmentGroup id="dend9_32__grp">
                <include segmentGroup="dend9_32_"/>
            </segmentGroup>

            <segmentGroup id="dend9_33__grp">
                <include segmentGroup="dend9_33_"/>
            </segmentGroup>

            <segmentGroup id="dend9_34__grp">
                <include segmentGroup="dend9_34_"/>
            </segmentGroup>

            <segmentGroup id="dend9_35__grp">
                <include segmentGroup="dend9_35_"/>
            </segmentGroup>

            <segmentGroup id="dend9_36__grp">
                <include segmentGroup="dend9_36_"/>
            </segmentGroup>

            <segmentGroup id="dend9_37__grp">
                <include segmentGroup="dend9_37_"/>
            </segmentGroup>

            <segmentGroup id="dend9_38__grp">
                <include segmentGroup="dend9_38_"/>
            </segmentGroup>

            <segmentGroup id="dend9_39__grp">
                <include segmentGroup="dend9_39_"/>
            </segmentGroup>

            <segmentGroup id="dend9_40__grp">
                <include segmentGroup="dend9_40_"/>
            </segmentGroup>

            <segmentGroup id="dend9_41__grp">
                <include segmentGroup="dend9_41_"/>
            </segmentGroup>

            <segmentGroup id="dend9_42__grp">
                <include segmentGroup="dend9_42_"/>
            </segmentGroup>

            <segmentGroup id="dend9_43__grp">
                <include segmentGroup="dend9_43_"/>
            </segmentGroup>

            <segmentGroup id="dend9_44__grp">
                <include segmentGroup="dend9_44_"/>
            </segmentGroup>

            <segmentGroup id="dend9_45__grp">
                <include segmentGroup="dend9_45_"/>
            </segmentGroup>

            <segmentGroup id="dend9_46__grp">
                <include segmentGroup="dend9_46_"/>
            </segmentGroup>

            <segmentGroup id="dend9_47__grp">
                <include segmentGroup="dend9_47_"/>
            </segmentGroup>

            <segmentGroup id="dend9_48__grp">
                <include segmentGroup="dend9_48_"/>
            </segmentGroup>

            <segmentGroup id="dend9_49__grp">
                <include segmentGroup="dend9_49_"/>
            </segmentGroup>

            <segmentGroup id="dend9_50__grp">
                <include segmentGroup="dend9_50_"/>
            </segmentGroup>

            <segmentGroup id="dend9_51__grp">
                <include segmentGroup="dend9_51_"/>
            </segmentGroup>

            <segmentGroup id="dend9_52__grp">
                <include segmentGroup="dend9_52_"/>
            </segmentGroup>

            <segmentGroup id="dend9_53__grp">
                <include segmentGroup="dend9_53_"/>
            </segmentGroup>

            <segmentGroup id="dend9_54__grp">
                <include segmentGroup="dend9_54_"/>
            </segmentGroup>

            <segmentGroup id="dend9_55__grp">
                <include segmentGroup="dend9_55_"/>
            </segmentGroup>

            <segmentGroup id="dend9_56__grp">
                <include segmentGroup="dend9_56_"/>
            </segmentGroup>

            <segmentGroup id="dend9_57__grp">
                <include segmentGroup="dend9_57_"/>
            </segmentGroup>

            <segmentGroup id="dend9_58__grp">
                <include segmentGroup="dend9_58_"/>
            </segmentGroup>

            <segmentGroup id="dend9_59__grp">
                <include segmentGroup="dend9_59_"/>
            </segmentGroup>

            <segmentGroup id="dend9_60__grp">
                <include segmentGroup="dend9_60_"/>
            </segmentGroup>

            <segmentGroup id="dend9_61__grp">
                <include segmentGroup="dend9_61_"/>
            </segmentGroup>

            <segmentGroup id="dend9_62__grp">
                <include segmentGroup="dend9_62_"/>
            </segmentGroup>

            <segmentGroup id="dend9_63__grp">
                <include segmentGroup="dend9_63_"/>
            </segmentGroup>

            <segmentGroup id="dend9_64__grp">
                <include segmentGroup="dend9_64_"/>
            </segmentGroup>

            <segmentGroup id="dend9_65__grp">
                <include segmentGroup="dend9_65_"/>
            </segmentGroup>

            <segmentGroup id="dend9_66__grp">
                <include segmentGroup="dend9_66_"/>
            </segmentGroup>

            <segmentGroup id="dend9_67__grp">
                <include segmentGroup="dend9_67_"/>
            </segmentGroup>

            <segmentGroup id="dend9_68__grp">
                <include segmentGroup="dend9_68_"/>
            </segmentGroup>

            <segmentGroup id="dend9_69__grp">
                <include segmentGroup="dend9_69_"/>
            </segmentGroup>

            <segmentGroup id="dend9_70__grp">
                <include segmentGroup="dend9_70_"/>
            </segmentGroup>

            <segmentGroup id="dend9_71__grp">
                <include segmentGroup="dend9_71_"/>
            </segmentGroup>

            <segmentGroup id="dend9_72__grp">
                <include segmentGroup="dend9_72_"/>
            </segmentGroup>

            <segmentGroup id="dend9_73__grp">
                <include segmentGroup="dend9_73_"/>
            </segmentGroup>

            <segmentGroup id="dend9_74__grp">
                <include segmentGroup="dend9_74_"/>
            </segmentGroup>

            <segmentGroup id="dend9_75__grp">
                <include segmentGroup="dend9_75_"/>
            </segmentGroup>

            <segmentGroup id="dend9_76__grp">
                <include segmentGroup="dend9_76_"/>
            </segmentGroup>

            <segmentGroup id="dend9_77__grp">
                <include segmentGroup="dend9_77_"/>
            </segmentGroup>

            <segmentGroup id="dend9_78__grp">
                <include segmentGroup="dend9_78_"/>
            </segmentGroup>

            <segmentGroup id="dend9_79__grp">
                <include segmentGroup="dend9_79_"/>
            </segmentGroup>

            <segmentGroup id="dend9_80__grp">
                <include segmentGroup="dend9_80_"/>
            </segmentGroup>

            <segmentGroup id="dend9_81__grp">
                <include segmentGroup="dend9_81_"/>
            </segmentGroup>

            <segmentGroup id="dend9_82__grp">
                <include segmentGroup="dend9_82_"/>
            </segmentGroup>

            <segmentGroup id="dend9_83__grp">
                <include segmentGroup="dend9_83_"/>
            </segmentGroup>

            <segmentGroup id="dend9_84__grp">
                <include segmentGroup="dend9_84_"/>
            </segmentGroup>

            <segmentGroup id="dend9_85__grp">
                <include segmentGroup="dend9_85_"/>
            </segmentGroup>

            <segmentGroup id="dend9_86__grp">
                <include segmentGroup="dend9_86_"/>
            </segmentGroup>

            <segmentGroup id="dend9_87__grp">
                <include segmentGroup="dend9_87_"/>
            </segmentGroup>

            <segmentGroup id="dend9_88__grp">
                <include segmentGroup="dend9_88_"/>
            </segmentGroup>

            <segmentGroup id="dend9_89__grp">
                <include segmentGroup="dend9_89_"/>
            </segmentGroup>

            <segmentGroup id="dend9_90__grp">
                <include segmentGroup="dend9_90_"/>
            </segmentGroup>

            <segmentGroup id="dend9_91__grp">
                <include segmentGroup="dend9_91_"/>
            </segmentGroup>

            <segmentGroup id="dend9_92__grp">
                <include segmentGroup="dend9_92_"/>
            </segmentGroup>

            <segmentGroup id="dend9_93__grp">
                <include segmentGroup="dend9_93_"/>
            </segmentGroup>

            <segmentGroup id="dend9_94__grp">
                <include segmentGroup="dend9_94_"/>
            </segmentGroup>

            <segmentGroup id="dend9_95__grp">
                <include segmentGroup="dend9_95_"/>
            </segmentGroup>

            <segmentGroup id="dend9_96__grp">
                <include segmentGroup="dend9_96_"/>
            </segmentGroup>

            <segmentGroup id="dend9_97__grp">
                <include segmentGroup="dend9_97_"/>
            </segmentGroup>

            <segmentGroup id="dend9_98__grp">
                <include segmentGroup="dend9_98_"/>
            </segmentGroup>

            <segmentGroup id="dend9_99__grp">
                <include segmentGroup="dend9_99_"/>
            </segmentGroup>

            <segmentGroup id="dend9_100__grp">
                <include segmentGroup="dend9_100_"/>
            </segmentGroup>

            <segmentGroup id="dend9_101__grp">
                <include segmentGroup="dend9_101_"/>
            </segmentGroup>

            <segmentGroup id="dend9_102__grp">
                <include segmentGroup="dend9_102_"/>
            </segmentGroup>

            <segmentGroup id="dend9_103__grp">
                <include segmentGroup="dend9_103_"/>
            </segmentGroup>

            <segmentGroup id="dend9_104__grp">
                <include segmentGroup="dend9_104_"/>
            </segmentGroup>

            <segmentGroup id="dend9_105__grp">
                <include segmentGroup="dend9_105_"/>
            </segmentGroup>

            <segmentGroup id="dend9_106__grp">
                <include segmentGroup="dend9_106_"/>
            </segmentGroup>

            <segmentGroup id="dend9_107__grp">
                <include segmentGroup="dend9_107_"/>
            </segmentGroup>

            <segmentGroup id="dend9_108__grp">
                <include segmentGroup="dend9_108_"/>
            </segmentGroup>

            <segmentGroup id="dend9_109__grp">
                <include segmentGroup="dend9_109_"/>
            </segmentGroup>

            <segmentGroup id="dend9_110__grp">
                <include segmentGroup="dend9_110_"/>
            </segmentGroup>

            <segmentGroup id="dend9_111__grp">
                <include segmentGroup="dend9_111_"/>
            </segmentGroup>

            <segmentGroup id="dend9_112__grp">
                <include segmentGroup="dend9_112_"/>
            </segmentGroup>

            <segmentGroup id="dend9_113__grp">
                <include segmentGroup="dend9_113_"/>
            </segmentGroup>

            <segmentGroup id="dend9_114__grp">
                <include segmentGroup="dend9_114_"/>
            </segmentGroup>

            <segmentGroup id="dend9_115__grp">
                <include segmentGroup="dend9_115_"/>
            </segmentGroup>

            <segmentGroup id="dend9_116__grp">
                <include segmentGroup="dend9_116_"/>
            </segmentGroup>

            <segmentGroup id="dend9_117__grp">
                <include segmentGroup="dend9_117_"/>
            </segmentGroup>

            <segmentGroup id="dend9_118__grp">
                <include segmentGroup="dend9_118_"/>
            </segmentGroup>

            <segmentGroup id="dend10_0__grp">
                <include segmentGroup="dend10_0_"/>
            </segmentGroup>

            <segmentGroup id="dend10_1__grp">
                <include segmentGroup="dend10_1_"/>
            </segmentGroup>

            <segmentGroup id="dend10_2__grp">
                <include segmentGroup="dend10_2_"/>
            </segmentGroup>

            <segmentGroup id="dend10_3__grp">
                <include segmentGroup="dend10_3_"/>
            </segmentGroup>

            <segmentGroup id="dend10_4__grp">
                <include segmentGroup="dend10_4_"/>
            </segmentGroup>

            <segmentGroup id="dend10_5__grp">
                <include segmentGroup="dend10_5_"/>
            </segmentGroup>

            <segmentGroup id="dend10_6__grp">
                <include segmentGroup="dend10_6_"/>
            </segmentGroup>

            <segmentGroup id="dend10_7__grp">
                <include segmentGroup="dend10_7_"/>
            </segmentGroup>

            <segmentGroup id="dend10_8__grp">
                <include segmentGroup="dend10_8_"/>
            </segmentGroup>

            <segmentGroup id="dend10_9__grp">
                <include segmentGroup="dend10_9_"/>
            </segmentGroup>

            <segmentGroup id="dend10_10__grp">
                <include segmentGroup="dend10_10_"/>
            </segmentGroup>

            <segmentGroup id="dend10_11__grp">
                <include segmentGroup="dend10_11_"/>
            </segmentGroup>

            <segmentGroup id="dend10_12__grp">
                <include segmentGroup="dend10_12_"/>
            </segmentGroup>

            <segmentGroup id="dend10_13__grp">
                <include segmentGroup="dend10_13_"/>
            </segmentGroup>

            <segmentGroup id="dend10_14__grp">
                <include segmentGroup="dend10_14_"/>
            </segmentGroup>

            <segmentGroup id="dend10_15__grp">
                <include segmentGroup="dend10_15_"/>
            </segmentGroup>

            <segmentGroup id="dend10_16__grp">
                <include segmentGroup="dend10_16_"/>
            </segmentGroup>

            <segmentGroup id="dend11_0__grp">
                <include segmentGroup="dend11_0_"/>
            </segmentGroup>

            <segmentGroup id="dend11_1__grp">
                <include segmentGroup="dend11_1_"/>
            </segmentGroup>

            <segmentGroup id="dend11_2__grp">
                <include segmentGroup="dend11_2_"/>
            </segmentGroup>

            <segmentGroup id="myelin_group">
                <include segmentGroup="myelin_0_"/>
                <include segmentGroup="myelin_1_"/>
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            </segmentGroup>

            <segmentGroup id="nodes">
                <include segmentGroup="node_0_"/>
                <include segmentGroup="node_1_"/>
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            </segmentGroup>

        </morphology>

            <!--Adding the biophysical parameters-->

        <biophysicalProperties id="biophys">

            <membraneProperties>

                <channelDensity condDensity="10.0 mS_per_cm2" id="K_ChannelML_soma_group" ionChannel="K_ChannelML" segmentGroup="soma_group" ion="k" erev="-90.0 mV"/>

                <channelDensity condDensity="10.0 mS_per_cm2" id="K_ChannelML_basal" ionChannel="K_ChannelML" segmentGroup="basal" ion="k" erev="-90.0 mV"/>

                <channelDensity condDensity="20.0 mS_per_cm2" id="LeakCond_nodes" ionChannel="LeakCond" segmentGroup="nodes" ion="non_specific" erev="-70.0 mV"/>

                <channelDensity condDensity="0.025 mS_per_cm2" id="LeakCond_soma_group" ionChannel="LeakCond" segmentGroup="soma_group" ion="non_specific" erev="-70.0 mV"/>

                <channelDensity condDensity="0.025 mS_per_cm2" id="LeakCond_myelin_group" ionChannel="LeakCond" segmentGroup="myelin_group" ion="non_specific" erev="-70.0 mV"/>

                <channelDensity condDensity="0.025 mS_per_cm2" id="LeakCond_axon_start" ionChannel="LeakCond" segmentGroup="axon_start" ion="non_specific" erev="-70.0 mV"/>

                <channelDensity condDensity="0.02876367 mS_per_cm2" id="LeakCond_dend9_78__grp" ionChannel="LeakCond" segmentGroup="dend9_78__grp" ion="non_specific" erev="-70.0 mV"/>

                <channelDensity condDensity="0.02906636 mS_per_cm2" id="LeakCond_dend6_0__grp" ionChannel="LeakCond" segmentGroup="dend6_0__grp" ion="non_specific" erev="-70.0 mV"/>

                <channelDensity condDensity="0.02938784 mS_per_cm2" id="LeakCond_dend9_84__grp" ionChannel="LeakCond" segmentGroup="dend9_84__grp" ion="non_specific" erev="-70.0 mV"/>

                <channelDensity condDensity="0.02953293 mS_per_cm2" id="LeakCond_dend9_9__grp" ionChannel="LeakCond" segmentGroup="dend9_9__grp" ion="non_specific" erev="-70.0 mV"/>

                <channelDensity condDensity="0.02970498 mS_per_cm2" id="LeakCond_dend9_1__grp" ionChannel="LeakCond" segmentGroup="dend9_1__grp" ion="non_specific" erev="-70.0 mV"/>

                <channelDensity condDensity="0.02970984 mS_per_cm2" id="LeakCond_dend9_0__grp" ionChannel="LeakCond" segmentGroup="dend9_0__grp" ion="non_specific" erev="-70.0 mV"/>

                <channelDensity condDensity="0.03040361 mS_per_cm2" id="LeakCond_dend9_77__grp" ionChannel="LeakCond" segmentGroup="dend9_77__grp" ion="non_specific" erev="-70.0 mV"/>

                <channelDensity condDensity="0.03066762 mS_per_cm2" id="LeakCond_dend3_0__grp" ionChannel="LeakCond" segmentGroup="dend3_0__grp" ion="non_specific" erev="-70.0 mV"/>

                <channelDensity condDensity="0.03072769 mS_per_cm2" id="LeakCond_dend9_88__grp" ionChannel="LeakCond" segmentGroup="dend9_88__grp" ion="non_specific" erev="-70.0 mV"/>

                <channelDensity condDensity="0.0307724 mS_per_cm2" id="LeakCond_dend9_8__grp" ionChannel="LeakCond" segmentGroup="dend9_8__grp" ion="non_specific" erev="-70.0 mV"/>

                <channelDensity condDensity="0.03078871 mS_per_cm2" id="LeakCond_dend2_0__grp" ionChannel="LeakCond" segmentGroup="dend2_0__grp" ion="non_specific" erev="-70.0 mV"/>

                <channelDensity condDensity="0.03117559 mS_per_cm2" id="LeakCond_dend9_79__grp" ionChannel="LeakCond" segmentGroup="dend9_79__grp" ion="non_specific" erev="-70.0 mV"/>

                <channelDensity condDensity="0.03123521 mS_per_cm2" id="LeakCond_dend9_94__grp" ionChannel="LeakCond" segmentGroup="dend9_94__grp" ion="non_specific" erev="-70.0 mV"/>

                <channelDensity condDensity="0.03131561 mS_per_cm2" id="LeakCond_dend8_0__grp" ionChannel="LeakCond" segmentGroup="dend8_0__grp" ion="non_specific" erev="-70.0 mV"/>

                <channelDensity condDensity="0.03167832 mS_per_cm2" id="LeakCond_dend9_100__grp" ionChannel="LeakCond" segmentGroup="dend9_100__grp" ion="non_specific" erev="-70.0 mV"/>

                <channelDensity condDensity="0.03169355 mS_per_cm2" id="LeakCond_dend9_39__grp" ionChannel="LeakCond" segmentGroup="dend9_39__grp" ion="non_specific" erev="-70.0 mV"/>

                <channelDensity condDensity="0.03202786 mS_per_cm2" id="LeakCond_dend9_57__grp" ionChannel="LeakCond" segmentGroup="dend9_57__grp" ion="non_specific" erev="-70.0 mV"/>

                <channelDensity condDensity="0.03220783 mS_per_cm2" id="LeakCond_dend9_24__grp" ionChannel="LeakCond" segmentGroup="dend9_24__grp" ion="non_specific" erev="-70.0 mV"/>

                <channelDensity condDensity="0.03243967 mS_per_cm2" id="LeakCond_dend9_108__grp" ionChannel="LeakCond" segmentGroup="dend9_108__grp" ion="non_specific" erev="-70.0 mV"/>

                <channelDensity condDensity="0.03244473 mS_per_cm2" id="LeakCond_dend9_85__grp" ionChannel="LeakCond" segmentGroup="dend9_85__grp" ion="non_specific" erev="-70.0 mV"/>

                <channelDensity condDensity="0.03251311 mS_per_cm2" id="LeakCond_dend9_118__grp" ionChannel="LeakCond" segmentGroup="dend9_118__grp" ion="non_specific" erev="-70.0 mV"/>

                <channelDensity condDensity="0.03257494 mS_per_cm2" id="LeakCond_dend9_81__grp" ionChannel="LeakCond" segmentGroup="dend9_81__grp" ion="non_specific" erev="-70.0 mV"/>

                <channelDensity condDensity="0.03292599 mS_per_cm2" id="LeakCond_dend9_89__grp" ionChannel="LeakCond" segmentGroup="dend9_89__grp" ion="non_specific" erev="-70.0 mV"/>

                <channelDensity condDensity="0.03294495 mS_per_cm2" id="LeakCond_dend9_109__grp" ionChannel="LeakCond" segmentGroup="dend9_109__grp" ion="non_specific" erev="-70.0 mV"/>

                <channelDensity condDensity="0.03339141 mS_per_cm2" id="LeakCond_dend6_12__grp" ionChannel="LeakCond" segmentGroup="dend6_12__grp" ion="non_specific" erev="-70.0 mV"/>

                <channelDensity condDensity="0.03343954 mS_per_cm2" id="LeakCond_dend9_25__grp" ionChannel="LeakCond" segmentGroup="dend9_25__grp" ion="non_specific" erev="-70.0 mV"/>

                <channelDensity condDensity="0.03346385 mS_per_cm2" id="LeakCond_dend9_101__grp" ionChannel="LeakCond" segmentGroup="dend9_101__grp" ion="non_specific" erev="-70.0 mV"/>

                <channelDensity condDensity="0.03358641 mS_per_cm2" id="LeakCond_dend9_92__grp" ionChannel="LeakCond" segmentGroup="dend9_92__grp" ion="non_specific" erev="-70.0 mV"/>

                <channelDensity condDensity="0.03358641 mS_per_cm2" id="LeakCond_dend9_91__grp" ionChannel="LeakCond" segmentGroup="dend9_91__grp" ion="non_specific" erev="-70.0 mV"/>

                <channelDensity condDensity="0.03358641 mS_per_cm2" id="LeakCond_dend9_90__grp" ionChannel="LeakCond" segmentGroup="dend9_90__grp" ion="non_specific" erev="-70.0 mV"/>

                <channelDensity condDensity="0.03358641 mS_per_cm2" id="LeakCond_dend9_105__grp" ionChannel="LeakCond" segmentGroup="dend9_105__grp" ion="non_specific" erev="-70.0 mV"/>

                <channelDensity condDensity="0.03359331 mS_per_cm2" id="LeakCond_dend9_63__grp" ionChannel="LeakCond" segmentGroup="dend9_63__grp" ion="non_specific" erev="-70.0 mV"/>

                <channelDensity condDensity="0.03369013 mS_per_cm2" id="LeakCond_dend9_50__grp" ionChannel="LeakCond" segmentGroup="dend9_50__grp" ion="non_specific" erev="-70.0 mV"/>

                <channelDensity condDensity="0.03388087 mS_per_cm2" id="LeakCond_dend9_87__grp" ionChannel="LeakCond" segmentGroup="dend9_87__grp" ion="non_specific" erev="-70.0 mV"/>

                <channelDensity condDensity="0.03391583 mS_per_cm2" id="LeakCond_dend9_95__grp" ionChannel="LeakCond" segmentGroup="dend9_95__grp" ion="non_specific" erev="-70.0 mV"/>

                <channelDensity condDensity="0.03395698 mS_per_cm2" id="LeakCond_dend9_111__grp" ionChannel="LeakCond" segmentGroup="dend9_111__grp" ion="non_specific" erev="-70.0 mV"/>

                <channelDensity condDensity="0.033973 mS_per_cm2" id="LeakCond_dend9_51__grp" ionChannel="LeakCond" segmentGroup="dend9_51__grp" ion="non_specific" erev="-70.0 mV"/>

                <channelDensity condDensity="0.03399259 mS_per_cm2" id="LeakCond_dend9_30__grp" ionChannel="LeakCond" segmentGroup="dend9_30__grp" ion="non_specific" erev="-70.0 mV"/>

                <channelDensity condDensity="0.03399837 mS_per_cm2" id="LeakCond_dend9_48__grp" ionChannel="LeakCond" segmentGroup="dend9_48__grp" ion="non_specific" erev="-70.0 mV"/>

                <channelDensity condDensity="0.03400907 mS_per_cm2" id="LeakCond_dend9_38__grp" ionChannel="LeakCond" segmentGroup="dend9_38__grp" ion="non_specific" erev="-70.0 mV"/>

                <channelDensity condDensity="0.0340618 mS_per_cm2" id="LeakCond_dend9_107__grp" ionChannel="LeakCond" segmentGroup="dend9_107__grp" ion="non_specific" erev="-70.0 mV"/>

                <channelDensity condDensity="0.03411392 mS_per_cm2" id="LeakCond_dend9_86__grp" ionChannel="LeakCond" segmentGroup="dend9_86__grp" ion="non_specific" erev="-70.0 mV"/>

                <channelDensity condDensity="0.03418684 mS_per_cm2" id="LeakCond_dend9_31__grp" ionChannel="LeakCond" segmentGroup="dend9_31__grp" ion="non_specific" erev="-70.0 mV"/>

                <channelDensity condDensity="0.03427953 mS_per_cm2" id="LeakCond_dend9_83__grp" ionChannel="LeakCond" segmentGroup="dend9_83__grp" ion="non_specific" erev="-70.0 mV"/>

                <channelDensity condDensity="0.03436472 mS_per_cm2" id="LeakCond_dend9_69__grp" ionChannel="LeakCond" segmentGroup="dend9_69__grp" ion="non_specific" erev="-70.0 mV"/>

                <channelDensity condDensity="0.0343649 mS_per_cm2" id="LeakCond_dend6_13__grp" ionChannel="LeakCond" segmentGroup="dend6_13__grp" ion="non_specific" erev="-70.0 mV"/>

                <channelDensity condDensity="0.03437682 mS_per_cm2" id="LeakCond_dend9_110__grp" ionChannel="LeakCond" segmentGroup="dend9_110__grp" ion="non_specific" erev="-70.0 mV"/>

                <channelDensity condDensity="0.03444505 mS_per_cm2" id="LeakCond_dend11_0__grp" ionChannel="LeakCond" segmentGroup="dend11_0__grp" ion="non_specific" erev="-70.0 mV"/>

                <channelDensity condDensity="0.03458618 mS_per_cm2" id="LeakCond_dend9_80__grp" ionChannel="LeakCond" segmentGroup="dend9_80__grp" ion="non_specific" erev="-70.0 mV"/>

                <channelDensity condDensity="0.0346203 mS_per_cm2" id="LeakCond_dend8_4__grp" ionChannel="LeakCond" segmentGroup="dend8_4__grp" ion="non_specific" erev="-70.0 mV"/>

                <channelDensity condDensity="0.03463701 mS_per_cm2" id="LeakCond_dend2_18__grp" ionChannel="LeakCond" segmentGroup="dend2_18__grp" ion="non_specific" erev="-70.0 mV"/>

                <channelDensity condDensity="0.03470977 mS_per_cm2" id="LeakCond_dend9_93__grp" ionChannel="LeakCond" segmentGroup="dend9_93__grp" ion="non_specific" erev="-70.0 mV"/>

                <channelDensity condDensity="0.03471593 mS_per_cm2" id="LeakCond_dend9_56__grp" ionChannel="LeakCond" segmentGroup="dend9_56__grp" ion="non_specific" erev="-70.0 mV"/>

                <channelDensity condDensity="0.03477165 mS_per_cm2" id="LeakCond_dend6_1__grp" ionChannel="LeakCond" segmentGroup="dend6_1__grp" ion="non_specific" erev="-70.0 mV"/>

                <channelDensity condDensity="0.03487597 mS_per_cm2" id="LeakCond_dend5_0__grp" ionChannel="LeakCond" segmentGroup="dend5_0__grp" ion="non_specific" erev="-70.0 mV"/>

                <channelDensity condDensity="0.0349074 mS_per_cm2" id="LeakCond_dend9_59__grp" ionChannel="LeakCond" segmentGroup="dend9_59__grp" ion="non_specific" erev="-70.0 mV"/>

                <channelDensity condDensity="0.0349074 mS_per_cm2" id="LeakCond_dend9_11__grp" ionChannel="LeakCond" segmentGroup="dend9_11__grp" ion="non_specific" erev="-70.0 mV"/>

                <channelDensity condDensity="0.03494342 mS_per_cm2" id="LeakCond_dend9_82__grp" ionChannel="LeakCond" segmentGroup="dend9_82__grp" ion="non_specific" erev="-70.0 mV"/>

                <channelDensity condDensity="0.03501748 mS_per_cm2" id="LeakCond_dend9_99__grp" ionChannel="LeakCond" segmentGroup="dend9_99__grp" ion="non_specific" erev="-70.0 mV"/>

                <channelDensity condDensity="0.03501748 mS_per_cm2" id="LeakCond_dend9_98__grp" ionChannel="LeakCond" segmentGroup="dend9_98__grp" ion="non_specific" erev="-70.0 mV"/>

                <channelDensity condDensity="0.03501748 mS_per_cm2" id="LeakCond_dend9_97__grp" ionChannel="LeakCond" segmentGroup="dend9_97__grp" ion="non_specific" erev="-70.0 mV"/>

                <channelDensity condDensity="0.03501748 mS_per_cm2" id="LeakCond_dend9_96__grp" ionChannel="LeakCond" segmentGroup="dend9_96__grp" ion="non_specific" erev="-70.0 mV"/>

                <channelDensity condDensity="0.03501748 mS_per_cm2" id="LeakCond_dend9_117__grp" ionChannel="LeakCond" segmentGroup="dend9_117__grp" ion="non_specific" erev="-70.0 mV"/>

                <channelDensity condDensity="0.03501748 mS_per_cm2" id="LeakCond_dend9_116__grp" ionChannel="LeakCond" segmentGroup="dend9_116__grp" ion="non_specific" erev="-70.0 mV"/>

                <channelDensity condDensity="0.03501748 mS_per_cm2" id="LeakCond_dend9_115__grp" ionChannel="LeakCond" segmentGroup="dend9_115__grp" ion="non_specific" erev="-70.0 mV"/>

                <channelDensity condDensity="0.03501748 mS_per_cm2" id="LeakCond_dend9_114__grp" ionChannel="LeakCond" segmentGroup="dend9_114__grp" ion="non_specific" erev="-70.0 mV"/>

                <channelDensity condDensity="0.03501748 mS_per_cm2" id="LeakCond_dend9_113__grp" ionChannel="LeakCond" segmentGroup="dend9_113__grp" ion="non_specific" erev="-70.0 mV"/>

                <channelDensity condDensity="0.0350974 mS_per_cm2" id="LeakCond_dend8_1__grp" ionChannel="LeakCond" segmentGroup="dend8_1__grp" ion="non_specific" erev="-70.0 mV"/>

                <channelDensity condDensity="0.03517611 mS_per_cm2" id="LeakCond_dend9_106__grp" ionChannel="LeakCond" segmentGroup="dend9_106__grp" ion="non_specific" erev="-70.0 mV"/>

                <channelDensity condDensity="0.03519937 mS_per_cm2" id="LeakCond_dend4_0__grp" ionChannel="LeakCond" segmentGroup="dend4_0__grp" ion="non_specific" erev="-70.0 mV"/>

                <channelDensity condDensity="0.03522602 mS_per_cm2" id="LeakCond_dend9_102__grp" ionChannel="LeakCond" segmentGroup="dend9_102__grp" ion="non_specific" erev="-70.0 mV"/>

                <channelDensity condDensity="0.03526891 mS_per_cm2" id="LeakCond_dend9_62__grp" ionChannel="LeakCond" segmentGroup="dend9_62__grp" ion="non_specific" erev="-70.0 mV"/>

                <channelDensity condDensity="0.0353101 mS_per_cm2" id="LeakCond_dend6_20__grp" ionChannel="LeakCond" segmentGroup="dend6_20__grp" ion="non_specific" erev="-70.0 mV"/>

                <channelDensity condDensity="0.03535381 mS_per_cm2" id="LeakCond_dend9_5__grp" ionChannel="LeakCond" segmentGroup="dend9_5__grp" ion="non_specific" erev="-70.0 mV"/>

                <channelDensity condDensity="0.03542899 mS_per_cm2" id="LeakCond_dend6_17__grp" ionChannel="LeakCond" segmentGroup="dend6_17__grp" ion="non_specific" erev="-70.0 mV"/>

                <channelDensity condDensity="0.03543869 mS_per_cm2" id="LeakCond_dend3_1__grp" ionChannel="LeakCond" segmentGroup="dend3_1__grp" ion="non_specific" erev="-70.0 mV"/>

                <channelDensity condDensity="0.0354945 mS_per_cm2" id="LeakCond_dend2_9__grp" ionChannel="LeakCond" segmentGroup="dend2_9__grp" ion="non_specific" erev="-70.0 mV"/>

                <channelDensity condDensity="0.0354945 mS_per_cm2" id="LeakCond_dend2_1__grp" ionChannel="LeakCond" segmentGroup="dend2_1__grp" ion="non_specific" erev="-70.0 mV"/>

                <channelDensity condDensity="0.0354945 mS_per_cm2" id="LeakCond_dend2_11__grp" ionChannel="LeakCond" segmentGroup="dend2_11__grp" ion="non_specific" erev="-70.0 mV"/>

                <channelDensity condDensity="0.03550098 mS_per_cm2" id="LeakCond_dend3_12__grp" ionChannel="LeakCond" segmentGroup="dend3_12__grp" ion="non_specific" erev="-70.0 mV"/>

                <channelDensity condDensity="0.0355106 mS_per_cm2" id="LeakCond_dend2_6__grp" ionChannel="LeakCond" segmentGroup="dend2_6__grp" ion="non_specific" erev="-70.0 mV"/>

                <channelDensity condDensity="0.03558135 mS_per_cm2" id="LeakCond_dend2_21__grp" ionChannel="LeakCond" segmentGroup="dend2_21__grp" ion="non_specific" erev="-70.0 mV"/>

                <channelDensity condDensity="0.03564483 mS_per_cm2" id="LeakCond_dend9_41__grp" ionChannel="LeakCond" segmentGroup="dend9_41__grp" ion="non_specific" erev="-70.0 mV"/>

                <channelDensity condDensity="0.035709 mS_per_cm2" id="LeakCond_dend9_2__grp" ionChannel="LeakCond" segmentGroup="dend9_2__grp" ion="non_specific" erev="-70.0 mV"/>

                <channelDensity condDensity="0.03574679 mS_per_cm2" id="LeakCond_dend3_2__grp" ionChannel="LeakCond" segmentGroup="dend3_2__grp" ion="non_specific" erev="-70.0 mV"/>

                <channelDensity condDensity="0.03589366 mS_per_cm2" id="LeakCond_dend9_26__grp" ionChannel="LeakCond" segmentGroup="dend9_26__grp" ion="non_specific" erev="-70.0 mV"/>

                <channelDensity condDensity="0.03597185 mS_per_cm2" id="LeakCond_dend9_12__grp" ionChannel="LeakCond" segmentGroup="dend9_12__grp" ion="non_specific" erev="-70.0 mV"/>

                <channelDensity condDensity="0.03597199 mS_per_cm2" id="LeakCond_dend2_28__grp" ionChannel="LeakCond" segmentGroup="dend2_28__grp" ion="non_specific" erev="-70.0 mV"/>

                <channelDensity condDensity="0.03598564 mS_per_cm2" id="LeakCond_dend9_27__grp" ionChannel="LeakCond" segmentGroup="dend9_27__grp" ion="non_specific" erev="-70.0 mV"/>

                <channelDensity condDensity="0.03599132 mS_per_cm2" id="LeakCond_dend9_21__grp" ionChannel="LeakCond" segmentGroup="dend9_21__grp" ion="non_specific" erev="-70.0 mV"/>

                <channelDensity condDensity="0.03635501 mS_per_cm2" id="LeakCond_dend7_0__grp" ionChannel="LeakCond" segmentGroup="dend7_0__grp" ion="non_specific" erev="-70.0 mV"/>

                <channelDensity condDensity="0.03638237 mS_per_cm2" id="LeakCond_dend6_22__grp" ionChannel="LeakCond" segmentGroup="dend6_22__grp" ion="non_specific" erev="-70.0 mV"/>

                <channelDensity condDensity="0.03650532 mS_per_cm2" id="LeakCond_dend9_60__grp" ionChannel="LeakCond" segmentGroup="dend9_60__grp" ion="non_specific" erev="-70.0 mV"/>

                <channelDensity condDensity="0.03650728 mS_per_cm2" id="LeakCond_dend9_61__grp" ionChannel="LeakCond" segmentGroup="dend9_61__grp" ion="non_specific" erev="-70.0 mV"/>

                <channelDensity condDensity="0.03650808 mS_per_cm2" id="LeakCond_dend9_35__grp" ionChannel="LeakCond" segmentGroup="dend9_35__grp" ion="non_specific" erev="-70.0 mV"/>

                <channelDensity condDensity="0.03651909 mS_per_cm2" id="LeakCond_dend2_19__grp" ionChannel="LeakCond" segmentGroup="dend2_19__grp" ion="non_specific" erev="-70.0 mV"/>

                <channelDensity condDensity="0.03657537 mS_per_cm2" id="LeakCond_dend7_4__grp" ionChannel="LeakCond" segmentGroup="dend7_4__grp" ion="non_specific" erev="-70.0 mV"/>

                <channelDensity condDensity="0.03663599 mS_per_cm2" id="LeakCond_dend7_1__grp" ionChannel="LeakCond" segmentGroup="dend7_1__grp" ion="non_specific" erev="-70.0 mV"/>

                <channelDensity condDensity="0.03664626 mS_per_cm2" id="LeakCond_dend6_7__grp" ionChannel="LeakCond" segmentGroup="dend6_7__grp" ion="non_specific" erev="-70.0 mV"/>

                <channelDensity condDensity="0.03671903 mS_per_cm2" id="LeakCond_dend6_14__grp" ionChannel="LeakCond" segmentGroup="dend6_14__grp" ion="non_specific" erev="-70.0 mV"/>

                <channelDensity condDensity="0.0367208 mS_per_cm2" id="LeakCond_dend2_23__grp" ionChannel="LeakCond" segmentGroup="dend2_23__grp" ion="non_specific" erev="-70.0 mV"/>

                <channelDensity condDensity="0.03678668 mS_per_cm2" id="LeakCond_dend2_2__grp" ionChannel="LeakCond" segmentGroup="dend2_2__grp" ion="non_specific" erev="-70.0 mV"/>

                <channelDensity condDensity="0.03678949 mS_per_cm2" id="LeakCond_dend7_2__grp" ionChannel="LeakCond" segmentGroup="dend7_2__grp" ion="non_specific" erev="-70.0 mV"/>

                <channelDensity condDensity="0.03679042 mS_per_cm2" id="LeakCond_dend8_3__grp" ionChannel="LeakCond" segmentGroup="dend8_3__grp" ion="non_specific" erev="-70.0 mV"/>

                <channelDensity condDensity="0.03680631 mS_per_cm2" id="LeakCond_dend3_4__grp" ionChannel="LeakCond" segmentGroup="dend3_4__grp" ion="non_specific" erev="-70.0 mV"/>

                <channelDensity condDensity="0.03680631 mS_per_cm2" id="LeakCond_dend2_3__grp" ionChannel="LeakCond" segmentGroup="dend2_3__grp" ion="non_specific" erev="-70.0 mV"/>

                <channelDensity condDensity="0.03680631 mS_per_cm2" id="LeakCond_dend10_9__grp" ionChannel="LeakCond" segmentGroup="dend10_9__grp" ion="non_specific" erev="-70.0 mV"/>

                <channelDensity condDensity="0.03680631 mS_per_cm2" id="LeakCond_dend10_5__grp" ionChannel="LeakCond" segmentGroup="dend10_5__grp" ion="non_specific" erev="-70.0 mV"/>

                <channelDensity condDensity="0.03680631 mS_per_cm2" id="LeakCond_dend10_4__grp" ionChannel="LeakCond" segmentGroup="dend10_4__grp" ion="non_specific" erev="-70.0 mV"/>

                <channelDensity condDensity="0.03680631 mS_per_cm2" id="LeakCond_dend10_1__grp" ionChannel="LeakCond" segmentGroup="dend10_1__grp" ion="non_specific" erev="-70.0 mV"/>

                <channelDensity condDensity="0.03680631 mS_per_cm2" id="LeakCond_dend10_14__grp" ionChannel="LeakCond" segmentGroup="dend10_14__grp" ion="non_specific" erev="-70.0 mV"/>

                <channelDensity condDensity="0.03680631 mS_per_cm2" id="LeakCond_dend10_12__grp" ionChannel="LeakCond" segmentGroup="dend10_12__grp" ion="non_specific" erev="-70.0 mV"/>

                <channelDensity condDensity="0.03680631 mS_per_cm2" id="LeakCond_dend10_0__grp" ionChannel="LeakCond" segmentGroup="dend10_0__grp" ion="non_specific" erev="-70.0 mV"/>

                <channelDensity condDensity="0.03680825 mS_per_cm2" id="LeakCond_dend9_32__grp" ionChannel="LeakCond" segmentGroup="dend9_32__grp" ion="non_specific" erev="-70.0 mV"/>

                <channelDensity condDensity="0.03681696 mS_per_cm2" id="LeakCond_dend8_6__grp" ionChannel="LeakCond" segmentGroup="dend8_6__grp" ion="non_specific" erev="-70.0 mV"/>

                <channelDensity condDensity="0.03685033 mS_per_cm2" id="LeakCond_dend2_13__grp" ionChannel="LeakCond" segmentGroup="dend2_13__grp" ion="non_specific" erev="-70.0 mV"/>

                <channelDensity condDensity="0.03686289 mS_per_cm2" id="LeakCond_dend8_2__grp" ionChannel="LeakCond" segmentGroup="dend8_2__grp" ion="non_specific" erev="-70.0 mV"/>

                <channelDensity condDensity="0.03686297 mS_per_cm2" id="LeakCond_dend11_2__grp" ionChannel="LeakCond" segmentGroup="dend11_2__grp" ion="non_specific" erev="-70.0 mV"/>

                <channelDensity condDensity="0.03693698 mS_per_cm2" id="LeakCond_dend5_1__grp" ionChannel="LeakCond" segmentGroup="dend5_1__grp" ion="non_specific" erev="-70.0 mV"/>

                <channelDensity condDensity="0.03693767 mS_per_cm2" id="LeakCond_dend9_29__grp" ionChannel="LeakCond" segmentGroup="dend9_29__grp" ion="non_specific" erev="-70.0 mV"/>

                <channelDensity condDensity="0.03702097 mS_per_cm2" id="LeakCond_dend9_104__grp" ionChannel="LeakCond" segmentGroup="dend9_104__grp" ion="non_specific" erev="-70.0 mV"/>

                <channelDensity condDensity="0.03702564 mS_per_cm2" id="LeakCond_dend4_1__grp" ionChannel="LeakCond" segmentGroup="dend4_1__grp" ion="non_specific" erev="-70.0 mV"/>

                <channelDensity condDensity="0.03704577 mS_per_cm2" id="LeakCond_dend9_58__grp" ionChannel="LeakCond" segmentGroup="dend9_58__grp" ion="non_specific" erev="-70.0 mV"/>

                <channelDensity condDensity="0.0370581 mS_per_cm2" id="LeakCond_dend6_19__grp" ionChannel="LeakCond" segmentGroup="dend6_19__grp" ion="non_specific" erev="-70.0 mV"/>

                <channelDensity condDensity="0.03711128 mS_per_cm2" id="LeakCond_dend3_7__grp" ionChannel="LeakCond" segmentGroup="dend3_7__grp" ion="non_specific" erev="-70.0 mV"/>

                <channelDensity condDensity="0.03717253 mS_per_cm2" id="LeakCond_dend6_2__grp" ionChannel="LeakCond" segmentGroup="dend6_2__grp" ion="non_specific" erev="-70.0 mV"/>

                <channelDensity condDensity="0.0372038 mS_per_cm2" id="LeakCond_dend9_6__grp" ionChannel="LeakCond" segmentGroup="dend9_6__grp" ion="non_specific" erev="-70.0 mV"/>

                <channelDensity condDensity="0.03721646 mS_per_cm2" id="LeakCond_dend6_4__grp" ionChannel="LeakCond" segmentGroup="dend6_4__grp" ion="non_specific" erev="-70.0 mV"/>

                <channelDensity condDensity="0.03723986 mS_per_cm2" id="LeakCond_dend9_42__grp" ionChannel="LeakCond" segmentGroup="dend9_42__grp" ion="non_specific" erev="-70.0 mV"/>

                <channelDensity condDensity="0.037247 mS_per_cm2" id="LeakCond_dend3_9__grp" ionChannel="LeakCond" segmentGroup="dend3_9__grp" ion="non_specific" erev="-70.0 mV"/>

                <channelDensity condDensity="0.0372679 mS_per_cm2" id="LeakCond_dend4_2__grp" ionChannel="LeakCond" segmentGroup="dend4_2__grp" ion="non_specific" erev="-70.0 mV"/>

                <channelDensity condDensity="0.03731084 mS_per_cm2" id="LeakCond_dend7_5__grp" ionChannel="LeakCond" segmentGroup="dend7_5__grp" ion="non_specific" erev="-70.0 mV"/>

                <channelDensity condDensity="0.03733722 mS_per_cm2" id="LeakCond_dend9_14__grp" ionChannel="LeakCond" segmentGroup="dend9_14__grp" ion="non_specific" erev="-70.0 mV"/>

                <channelDensity condDensity="0.03737746 mS_per_cm2" id="LeakCond_dend6_26__grp" ionChannel="LeakCond" segmentGroup="dend6_26__grp" ion="non_specific" erev="-70.0 mV"/>

                <channelDensity condDensity="0.03738424 mS_per_cm2" id="LeakCond_dend9_53__grp" ionChannel="LeakCond" segmentGroup="dend9_53__grp" ion="non_specific" erev="-70.0 mV"/>

                <channelDensity condDensity="0.03738424 mS_per_cm2" id="LeakCond_dend9_46__grp" ionChannel="LeakCond" segmentGroup="dend9_46__grp" ion="non_specific" erev="-70.0 mV"/>

                <channelDensity condDensity="0.03738424 mS_per_cm2" id="LeakCond_dend9_45__grp" ionChannel="LeakCond" segmentGroup="dend9_45__grp" ion="non_specific" erev="-70.0 mV"/>

                <channelDensity condDensity="0.03738424 mS_per_cm2" id="LeakCond_dend9_43__grp" ionChannel="LeakCond" segmentGroup="dend9_43__grp" ion="non_specific" erev="-70.0 mV"/>

                <channelDensity condDensity="0.03738424 mS_per_cm2" id="LeakCond_dend9_18__grp" ionChannel="LeakCond" segmentGroup="dend9_18__grp" ion="non_specific" erev="-70.0 mV"/>

                <channelDensity condDensity="0.03738424 mS_per_cm2" id="LeakCond_dend9_16__grp" ionChannel="LeakCond" segmentGroup="dend9_16__grp" ion="non_specific" erev="-70.0 mV"/>

                <channelDensity condDensity="0.0373875 mS_per_cm2" id="LeakCond_dend2_22__grp" ionChannel="LeakCond" segmentGroup="dend2_22__grp" ion="non_specific" erev="-70.0 mV"/>

                <channelDensity condDensity="0.03740214 mS_per_cm2" id="LeakCond_dend2_25__grp" ionChannel="LeakCond" segmentGroup="dend2_25__grp" ion="non_specific" erev="-70.0 mV"/>

                <channelDensity condDensity="0.03740968 mS_per_cm2" id="LeakCond_dend6_18__grp" ionChannel="LeakCond" segmentGroup="dend6_18__grp" ion="non_specific" erev="-70.0 mV"/>

                <channelDensity condDensity="0.03743302 mS_per_cm2" id="LeakCond_dend6_23__grp" ionChannel="LeakCond" segmentGroup="dend6_23__grp" ion="non_specific" erev="-70.0 mV"/>

                <channelDensity condDensity="0.03747032 mS_per_cm2" id="LeakCond_dend9_44__grp" ionChannel="LeakCond" segmentGroup="dend9_44__grp" ion="non_specific" erev="-70.0 mV"/>

                <channelDensity condDensity="0.03750973 mS_per_cm2" id="LeakCond_dend9_65__grp" ionChannel="LeakCond" segmentGroup="dend9_65__grp" ion="non_specific" erev="-70.0 mV"/>

                <channelDensity condDensity="0.03754576 mS_per_cm2" id="LeakCond_dend3_13__grp" ionChannel="LeakCond" segmentGroup="dend3_13__grp" ion="non_specific" erev="-70.0 mV"/>

                <channelDensity condDensity="0.0375624 mS_per_cm2" id="LeakCond_dend7_3__grp" ionChannel="LeakCond" segmentGroup="dend7_3__grp" ion="non_specific" erev="-70.0 mV"/>

                <channelDensity condDensity="0.03757593 mS_per_cm2" id="LeakCond_dend5_2__grp" ionChannel="LeakCond" segmentGroup="dend5_2__grp" ion="non_specific" erev="-70.0 mV"/>

                <channelDensity condDensity="0.03758491 mS_per_cm2" id="LeakCond_dend9_73__grp" ionChannel="LeakCond" segmentGroup="dend9_73__grp" ion="non_specific" erev="-70.0 mV"/>

                <channelDensity condDensity="0.03764105 mS_per_cm2" id="LeakCond_dend9_70__grp" ionChannel="LeakCond" segmentGroup="dend9_70__grp" ion="non_specific" erev="-70.0 mV"/>

                <channelDensity condDensity="0.03764302 mS_per_cm2" id="LeakCond_dend2_12__grp" ionChannel="LeakCond" segmentGroup="dend2_12__grp" ion="non_specific" erev="-70.0 mV"/>

                <channelDensity condDensity="0.03770691 mS_per_cm2" id="LeakCond_dend8_5__grp" ionChannel="LeakCond" segmentGroup="dend8_5__grp" ion="non_specific" erev="-70.0 mV"/>

                <channelDensity condDensity="0.03773712 mS_per_cm2" id="LeakCond_dend6_21__grp" ionChannel="LeakCond" segmentGroup="dend6_21__grp" ion="non_specific" erev="-70.0 mV"/>

                <channelDensity condDensity="0.03776395 mS_per_cm2" id="LeakCond_dend6_9__grp" ionChannel="LeakCond" segmentGroup="dend6_9__grp" ion="non_specific" erev="-70.0 mV"/>

                <channelDensity condDensity="0.03778417 mS_per_cm2" id="LeakCond_dend2_24__grp" ionChannel="LeakCond" segmentGroup="dend2_24__grp" ion="non_specific" erev="-70.0 mV"/>

                <channelDensity condDensity="0.03795936 mS_per_cm2" id="LeakCond_dend9_37__grp" ionChannel="LeakCond" segmentGroup="dend9_37__grp" ion="non_specific" erev="-70.0 mV"/>

                <channelDensity condDensity="0.03800215 mS_per_cm2" id="LeakCond_dend6_6__grp" ionChannel="LeakCond" segmentGroup="dend6_6__grp" ion="non_specific" erev="-70.0 mV"/>

                <channelDensity condDensity="0.03800728 mS_per_cm2" id="LeakCond_dend11_1__grp" ionChannel="LeakCond" segmentGroup="dend11_1__grp" ion="non_specific" erev="-70.0 mV"/>

                <channelDensity condDensity="0.0380442 mS_per_cm2" id="LeakCond_dend9_112__grp" ionChannel="LeakCond" segmentGroup="dend9_112__grp" ion="non_specific" erev="-70.0 mV"/>

                <channelDensity condDensity="0.03807194 mS_per_cm2" id="LeakCond_dend6_15__grp" ionChannel="LeakCond" segmentGroup="dend6_15__grp" ion="non_specific" erev="-70.0 mV"/>

                <channelDensity condDensity="0.0381138 mS_per_cm2" id="LeakCond_dend9_40__grp" ionChannel="LeakCond" segmentGroup="dend9_40__grp" ion="non_specific" erev="-70.0 mV"/>

                <channelDensity condDensity="0.03812757 mS_per_cm2" id="LeakCond_dend9_49__grp" ionChannel="LeakCond" segmentGroup="dend9_49__grp" ion="non_specific" erev="-70.0 mV"/>

                <channelDensity condDensity="0.03822302 mS_per_cm2" id="LeakCond_dend9_54__grp" ionChannel="LeakCond" segmentGroup="dend9_54__grp" ion="non_specific" erev="-70.0 mV"/>

                <channelDensity condDensity="0.03823486 mS_per_cm2" id="LeakCond_dend9_71__grp" ionChannel="LeakCond" segmentGroup="dend9_71__grp" ion="non_specific" erev="-70.0 mV"/>

                <channelDensity condDensity="0.03825794 mS_per_cm2" id="LeakCond_dend9_3__grp" ionChannel="LeakCond" segmentGroup="dend9_3__grp" ion="non_specific" erev="-70.0 mV"/>

                <channelDensity condDensity="0.03826512 mS_per_cm2" id="LeakCond_dend2_4__grp" ionChannel="LeakCond" segmentGroup="dend2_4__grp" ion="non_specific" erev="-70.0 mV"/>

                <channelDensity condDensity="0.03831196 mS_per_cm2" id="LeakCond_dend10_8__grp" ionChannel="LeakCond" segmentGroup="dend10_8__grp" ion="non_specific" erev="-70.0 mV"/>

                <channelDensity condDensity="0.03834148 mS_per_cm2" id="LeakCond_dend10_2__grp" ionChannel="LeakCond" segmentGroup="dend10_2__grp" ion="non_specific" erev="-70.0 mV"/>

                <channelDensity condDensity="0.03834717 mS_per_cm2" id="LeakCond_dend10_16__grp" ionChannel="LeakCond" segmentGroup="dend10_16__grp" ion="non_specific" erev="-70.0 mV"/>

                <channelDensity condDensity="0.03835442 mS_per_cm2" id="LeakCond_dend10_10__grp" ionChannel="LeakCond" segmentGroup="dend10_10__grp" ion="non_specific" erev="-70.0 mV"/>

                <channelDensity condDensity="0.03840633 mS_per_cm2" id="LeakCond_dend10_6__grp" ionChannel="LeakCond" segmentGroup="dend10_6__grp" ion="non_specific" erev="-70.0 mV"/>

                <channelDensity condDensity="0.03840941 mS_per_cm2" id="LeakCond_dend3_14__grp" ionChannel="LeakCond" segmentGroup="dend3_14__grp" ion="non_specific" erev="-70.0 mV"/>

                <channelDensity condDensity="0.0384491 mS_per_cm2" id="LeakCond_dend6_5__grp" ionChannel="LeakCond" segmentGroup="dend6_5__grp" ion="non_specific" erev="-70.0 mV"/>

                <channelDensity condDensity="0.03845475 mS_per_cm2" id="LeakCond_dend9_68__grp" ionChannel="LeakCond" segmentGroup="dend9_68__grp" ion="non_specific" erev="-70.0 mV"/>

                <channelDensity condDensity="0.0384583 mS_per_cm2" id="LeakCond_dend9_23__grp" ionChannel="LeakCond" segmentGroup="dend9_23__grp" ion="non_specific" erev="-70.0 mV"/>

                <channelDensity condDensity="0.03846286 mS_per_cm2" id="LeakCond_dend9_47__grp" ionChannel="LeakCond" segmentGroup="dend9_47__grp" ion="non_specific" erev="-70.0 mV"/>

                <channelDensity condDensity="0.03849293 mS_per_cm2" id="LeakCond_dend6_3__grp" ionChannel="LeakCond" segmentGroup="dend6_3__grp" ion="non_specific" erev="-70.0 mV"/>

                <channelDensity condDensity="0.03849293 mS_per_cm2" id="LeakCond_dend6_28__grp" ionChannel="LeakCond" segmentGroup="dend6_28__grp" ion="non_specific" erev="-70.0 mV"/>

                <channelDensity condDensity="0.03849293 mS_per_cm2" id="LeakCond_dend6_27__grp" ionChannel="LeakCond" segmentGroup="dend6_27__grp" ion="non_specific" erev="-70.0 mV"/>

                <channelDensity condDensity="0.03849293 mS_per_cm2" id="LeakCond_dend2_15__grp" ionChannel="LeakCond" segmentGroup="dend2_15__grp" ion="non_specific" erev="-70.0 mV"/>

                <channelDensity condDensity="0.03854091 mS_per_cm2" id="LeakCond_dend5_4__grp" ionChannel="LeakCond" segmentGroup="dend5_4__grp" ion="non_specific" erev="-70.0 mV"/>

                <channelDensity condDensity="0.03858177 mS_per_cm2" id="LeakCond_dend5_3__grp" ionChannel="LeakCond" segmentGroup="dend5_3__grp" ion="non_specific" erev="-70.0 mV"/>

                <channelDensity condDensity="0.03860372 mS_per_cm2" id="LeakCond_dend9_64__grp" ionChannel="LeakCond" segmentGroup="dend9_64__grp" ion="non_specific" erev="-70.0 mV"/>

                <channelDensity condDensity="0.03862251 mS_per_cm2" id="LeakCond_dend6_24__grp" ionChannel="LeakCond" segmentGroup="dend6_24__grp" ion="non_specific" erev="-70.0 mV"/>

                <channelDensity condDensity="0.03867285 mS_per_cm2" id="LeakCond_dend6_16__grp" ionChannel="LeakCond" segmentGroup="dend6_16__grp" ion="non_specific" erev="-70.0 mV"/>

                <channelDensity condDensity="0.03867652 mS_per_cm2" id="LeakCond_dend9_7__grp" ionChannel="LeakCond" segmentGroup="dend9_7__grp" ion="non_specific" erev="-70.0 mV"/>

                <channelDensity condDensity="0.0387445 mS_per_cm2" id="LeakCond_dend3_15__grp" ionChannel="LeakCond" segmentGroup="dend3_15__grp" ion="non_specific" erev="-70.0 mV"/>

                <channelDensity condDensity="0.03881816 mS_per_cm2" id="LeakCond_dend10_11__grp" ionChannel="LeakCond" segmentGroup="dend10_11__grp" ion="non_specific" erev="-70.0 mV"/>

                <channelDensity condDensity="0.03884248 mS_per_cm2" id="LeakCond_dend7_6__grp" ionChannel="LeakCond" segmentGroup="dend7_6__grp" ion="non_specific" erev="-70.0 mV"/>

                <channelDensity condDensity="0.03895554 mS_per_cm2" id="LeakCond_dend6_25__grp" ionChannel="LeakCond" segmentGroup="dend6_25__grp" ion="non_specific" erev="-70.0 mV"/>

                <channelDensity condDensity="0.0390658 mS_per_cm2" id="LeakCond_dend9_22__grp" ionChannel="LeakCond" segmentGroup="dend9_22__grp" ion="non_specific" erev="-70.0 mV"/>

                <channelDensity condDensity="0.03907835 mS_per_cm2" id="LeakCond_dend6_30__grp" ionChannel="LeakCond" segmentGroup="dend6_30__grp" ion="non_specific" erev="-70.0 mV"/>

                <channelDensity condDensity="0.03909575 mS_per_cm2" id="LeakCond_dend2_10__grp" ionChannel="LeakCond" segmentGroup="dend2_10__grp" ion="non_specific" erev="-70.0 mV"/>

                <channelDensity condDensity="0.03910456 mS_per_cm2" id="LeakCond_dend10_13__grp" ionChannel="LeakCond" segmentGroup="dend10_13__grp" ion="non_specific" erev="-70.0 mV"/>

                <channelDensity condDensity="0.03915342 mS_per_cm2" id="LeakCond_dend9_75__grp" ionChannel="LeakCond" segmentGroup="dend9_75__grp" ion="non_specific" erev="-70.0 mV"/>

                <channelDensity condDensity="0.03915342 mS_per_cm2" id="LeakCond_dend9_74__grp" ionChannel="LeakCond" segmentGroup="dend9_74__grp" ion="non_specific" erev="-70.0 mV"/>

                <channelDensity condDensity="0.03915342 mS_per_cm2" id="LeakCond_dend9_33__grp" ionChannel="LeakCond" segmentGroup="dend9_33__grp" ion="non_specific" erev="-70.0 mV"/>

                <channelDensity condDensity="0.03916432 mS_per_cm2" id="LeakCond_dend9_55__grp" ionChannel="LeakCond" segmentGroup="dend9_55__grp" ion="non_specific" erev="-70.0 mV"/>

                <channelDensity condDensity="0.03918784 mS_per_cm2" id="LeakCond_dend3_3__grp" ionChannel="LeakCond" segmentGroup="dend3_3__grp" ion="non_specific" erev="-70.0 mV"/>

                <channelDensity condDensity="0.0392071 mS_per_cm2" id="LeakCond_dend3_16__grp" ionChannel="LeakCond" segmentGroup="dend3_16__grp" ion="non_specific" erev="-70.0 mV"/>

                <channelDensity condDensity="0.03920738 mS_per_cm2" id="LeakCond_dend9_28__grp" ionChannel="LeakCond" segmentGroup="dend9_28__grp" ion="non_specific" erev="-70.0 mV"/>

                <channelDensity condDensity="0.03923154 mS_per_cm2" id="LeakCond_dend9_36__grp" ionChannel="LeakCond" segmentGroup="dend9_36__grp" ion="non_specific" erev="-70.0 mV"/>

                <channelDensity condDensity="0.03931306 mS_per_cm2" id="LeakCond_dend10_3__grp" ionChannel="LeakCond" segmentGroup="dend10_3__grp" ion="non_specific" erev="-70.0 mV"/>

                <channelDensity condDensity="0.0393193 mS_per_cm2" id="LeakCond_dend9_34__grp" ionChannel="LeakCond" segmentGroup="dend9_34__grp" ion="non_specific" erev="-70.0 mV"/>

                <channelDensity condDensity="0.03934287 mS_per_cm2" id="LeakCond_dend9_4__grp" ionChannel="LeakCond" segmentGroup="dend9_4__grp" ion="non_specific" erev="-70.0 mV"/>

                <channelDensity condDensity="0.03941056 mS_per_cm2" id="LeakCond_dend2_8__grp" ionChannel="LeakCond" segmentGroup="dend2_8__grp" ion="non_specific" erev="-70.0 mV"/>

                <channelDensity condDensity="0.0395307 mS_per_cm2" id="LeakCond_dend3_6__grp" ionChannel="LeakCond" segmentGroup="dend3_6__grp" ion="non_specific" erev="-70.0 mV"/>

                <channelDensity condDensity="0.03966042 mS_per_cm2" id="LeakCond_dend2_26__grp" ionChannel="LeakCond" segmentGroup="dend2_26__grp" ion="non_specific" erev="-70.0 mV"/>

                <channelDensity condDensity="0.03975008 mS_per_cm2" id="LeakCond_dend10_15__grp" ionChannel="LeakCond" segmentGroup="dend10_15__grp" ion="non_specific" erev="-70.0 mV"/>

                <channelDensity condDensity="0.03980923 mS_per_cm2" id="LeakCond_dend3_11__grp" ionChannel="LeakCond" segmentGroup="dend3_11__grp" ion="non_specific" erev="-70.0 mV"/>

                <channelDensity condDensity="0.03986007 mS_per_cm2" id="LeakCond_dend2_5__grp" ionChannel="LeakCond" segmentGroup="dend2_5__grp" ion="non_specific" erev="-70.0 mV"/>

                <channelDensity condDensity="0.03989126 mS_per_cm2" id="LeakCond_dend9_20__grp" ionChannel="LeakCond" segmentGroup="dend9_20__grp" ion="non_specific" erev="-70.0 mV"/>

                <channelDensity condDensity="0.03992019 mS_per_cm2" id="LeakCond_dend9_103__grp" ionChannel="LeakCond" segmentGroup="dend9_103__grp" ion="non_specific" erev="-70.0 mV"/>

                <channelDensity condDensity="0.039968 mS_per_cm2" id="LeakCond_dend2_17__grp" ionChannel="LeakCond" segmentGroup="dend2_17__grp" ion="non_specific" erev="-70.0 mV"/>

                <channelDensity condDensity="0.04001685 mS_per_cm2" id="LeakCond_dend2_7__grp" ionChannel="LeakCond" segmentGroup="dend2_7__grp" ion="non_specific" erev="-70.0 mV"/>

                <channelDensity condDensity="0.04005314 mS_per_cm2" id="LeakCond_dend9_52__grp" ionChannel="LeakCond" segmentGroup="dend9_52__grp" ion="non_specific" erev="-70.0 mV"/>

                <channelDensity condDensity="0.04007752 mS_per_cm2" id="LeakCond_dend9_13__grp" ionChannel="LeakCond" segmentGroup="dend9_13__grp" ion="non_specific" erev="-70.0 mV"/>

                <channelDensity condDensity="0.04023288 mS_per_cm2" id="LeakCond_dend6_11__grp" ionChannel="LeakCond" segmentGroup="dend6_11__grp" ion="non_specific" erev="-70.0 mV"/>

                <channelDensity condDensity="0.04025218 mS_per_cm2" id="LeakCond_dend3_5__grp" ionChannel="LeakCond" segmentGroup="dend3_5__grp" ion="non_specific" erev="-70.0 mV"/>

                <channelDensity condDensity="0.04025687 mS_per_cm2" id="LeakCond_dend2_20__grp" ionChannel="LeakCond" segmentGroup="dend2_20__grp" ion="non_specific" erev="-70.0 mV"/>

                <channelDensity condDensity="0.04046291 mS_per_cm2" id="LeakCond_dend9_67__grp" ionChannel="LeakCond" segmentGroup="dend9_67__grp" ion="non_specific" erev="-70.0 mV"/>

                <channelDensity condDensity="0.04061148 mS_per_cm2" id="LeakCond_dend6_8__grp" ionChannel="LeakCond" segmentGroup="dend6_8__grp" ion="non_specific" erev="-70.0 mV"/>

                <channelDensity condDensity="0.04061778 mS_per_cm2" id="LeakCond_dend9_72__grp" ionChannel="LeakCond" segmentGroup="dend9_72__grp" ion="non_specific" erev="-70.0 mV"/>

                <channelDensity condDensity="0.0406178 mS_per_cm2" id="LeakCond_dend2_27__grp" ionChannel="LeakCond" segmentGroup="dend2_27__grp" ion="non_specific" erev="-70.0 mV"/>

                <channelDensity condDensity="0.04068938 mS_per_cm2" id="LeakCond_dend6_29__grp" ionChannel="LeakCond" segmentGroup="dend6_29__grp" ion="non_specific" erev="-70.0 mV"/>

                <channelDensity condDensity="0.04101087 mS_per_cm2" id="LeakCond_dend3_10__grp" ionChannel="LeakCond" segmentGroup="dend3_10__grp" ion="non_specific" erev="-70.0 mV"/>

                <channelDensity condDensity="0.04107838 mS_per_cm2" id="LeakCond_dend9_17__grp" ionChannel="LeakCond" segmentGroup="dend9_17__grp" ion="non_specific" erev="-70.0 mV"/>

                <channelDensity condDensity="0.04121505 mS_per_cm2" id="LeakCond_dend9_10__grp" ionChannel="LeakCond" segmentGroup="dend9_10__grp" ion="non_specific" erev="-70.0 mV"/>

                <channelDensity condDensity="0.04140457 mS_per_cm2" id="LeakCond_dend9_15__grp" ionChannel="LeakCond" segmentGroup="dend9_15__grp" ion="non_specific" erev="-70.0 mV"/>

                <channelDensity condDensity="0.04172417 mS_per_cm2" id="LeakCond_dend2_14__grp" ionChannel="LeakCond" segmentGroup="dend2_14__grp" ion="non_specific" erev="-70.0 mV"/>

                <channelDensity condDensity="0.04179943 mS_per_cm2" id="LeakCond_dend9_19__grp" ionChannel="LeakCond" segmentGroup="dend9_19__grp" ion="non_specific" erev="-70.0 mV"/>

                <channelDensity condDensity="0.04277098 mS_per_cm2" id="LeakCond_dend10_7__grp" ionChannel="LeakCond" segmentGroup="dend10_7__grp" ion="non_specific" erev="-70.0 mV"/>

                <channelDensity condDensity="0.0434401 mS_per_cm2" id="LeakCond_dend3_8__grp" ionChannel="LeakCond" segmentGroup="dend3_8__grp" ion="non_specific" erev="-70.0 mV"/>

                <channelDensity condDensity="0.04350869 mS_per_cm2" id="LeakCond_dend6_10__grp" ionChannel="LeakCond" segmentGroup="dend6_10__grp" ion="non_specific" erev="-70.0 mV"/>

                <channelDensity condDensity="0.04357418 mS_per_cm2" id="LeakCond_dend2_16__grp" ionChannel="LeakCond" segmentGroup="dend2_16__grp" ion="non_specific" erev="-70.0 mV"/>

                <channelDensity condDensity="0.0445483 mS_per_cm2" id="LeakCond_dend9_66__grp" ionChannel="LeakCond" segmentGroup="dend9_66__grp" ion="non_specific" erev="-70.0 mV"/>

                <channelDensity condDensity="0.04512812 mS_per_cm2" id="LeakCond_dend9_76__grp" ionChannel="LeakCond" segmentGroup="dend9_76__grp" ion="non_specific" erev="-70.0 mV"/>

                <channelDensity condDensity="3000.0 mS_per_cm2" id="Na_ChannelML_high_na_cond_dens" ionChannel="Na_ChannelML" segmentGroup="high_na_cond_dens" ion="na" erev="60.0 mV"/>

                <channelDensity condDensity="3.0 mS_per_cm2" id="Na_ChannelML_low_na_cond_dens" ionChannel="Na_ChannelML" segmentGroup="low_na_cond_dens" ion="na" erev="60.0 mV"/>

                <spikeThresh value="0.0 mV"/>

                <specificCapacitance segmentGroup="dendrite_group" value="1 uF_per_cm2"/>
                <!--
                <specificCapacitance segmentGroup="dend6_12__grp" value="1.001742 uF_per_cm2"/>

                <specificCapacitance segmentGroup="dend9_25__grp" value="1.003186 uF_per_cm2"/>

                <specificCapacitance segmentGroup="dend9_101__grp" value="1.003916 uF_per_cm2"/>

                <specificCapacitance segmentGroup="dend9_105__grp" value="1.007592 uF_per_cm2"/>

                <specificCapacitance segmentGroup="dend9_90__grp" value="1.007592 uF_per_cm2"/>

                <specificCapacitance segmentGroup="dend9_91__grp" value="1.007592 uF_per_cm2"/>

                <specificCapacitance segmentGroup="dend9_92__grp" value="1.007592 uF_per_cm2"/>

                <specificCapacitance segmentGroup="dend9_63__grp" value="1.007799 uF_per_cm2"/>

                <specificCapacitance segmentGroup="dend9_50__grp" value="1.010704 uF_per_cm2"/>

                <specificCapacitance segmentGroup="dend9_87__grp" value="1.016426 uF_per_cm2"/>

                <specificCapacitance segmentGroup="dend9_95__grp" value="1.017475 uF_per_cm2"/>

                <specificCapacitance segmentGroup="dend9_111__grp" value="1.01871 uF_per_cm2"/>

                <specificCapacitance segmentGroup="dend9_51__grp" value="1.01919 uF_per_cm2"/>

                <specificCapacitance segmentGroup="dend9_30__grp" value="1.019778 uF_per_cm2"/>

                <specificCapacitance segmentGroup="dend9_48__grp" value="1.019951 uF_per_cm2"/>

                <specificCapacitance segmentGroup="dend9_38__grp" value="1.020272 uF_per_cm2"/>

                <specificCapacitance segmentGroup="dend9_107__grp" value="1.021854 uF_per_cm2"/>

                <specificCapacitance segmentGroup="dend9_86__grp" value="1.023418 uF_per_cm2"/>

                <specificCapacitance segmentGroup="dend9_31__grp" value="1.025605 uF_per_cm2"/>

                <specificCapacitance segmentGroup="dend9_83__grp" value="1.028386 uF_per_cm2"/>

                <specificCapacitance segmentGroup="dend9_69__grp" value="1.030942 uF_per_cm2"/>

                <specificCapacitance segmentGroup="dend6_13__grp" value="1.030947 uF_per_cm2"/>

                <specificCapacitance segmentGroup="dend9_110__grp" value="1.031305 uF_per_cm2"/>

                <specificCapacitance segmentGroup="dend11_0__grp" value="1.033352 uF_per_cm2"/>

                <specificCapacitance segmentGroup="dend9_80__grp" value="1.037585 uF_per_cm2"/>

                <specificCapacitance segmentGroup="dend8_4__grp" value="1.038609 uF_per_cm2"/>

                <specificCapacitance segmentGroup="dend2_18__grp" value="1.03911 uF_per_cm2"/>

                <specificCapacitance segmentGroup="dend9_93__grp" value="1.041293 uF_per_cm2"/>

                <specificCapacitance segmentGroup="dend9_56__grp" value="1.041478 uF_per_cm2"/>

                <specificCapacitance segmentGroup="dend6_1__grp" value="1.043149 uF_per_cm2"/>

                <specificCapacitance segmentGroup="dend5_0__grp" value="1.046279 uF_per_cm2"/>

                <specificCapacitance segmentGroup="dend9_11__grp" value="1.047222 uF_per_cm2"/>

                <specificCapacitance segmentGroup="dend9_59__grp" value="1.047222 uF_per_cm2"/>

                <specificCapacitance segmentGroup="dend9_82__grp" value="1.048303 uF_per_cm2"/>

                <specificCapacitance segmentGroup="dend9_113__grp" value="1.050524 uF_per_cm2"/>

                <specificCapacitance segmentGroup="dend9_114__grp" value="1.050524 uF_per_cm2"/>

                <specificCapacitance segmentGroup="dend9_115__grp" value="1.050524 uF_per_cm2"/>

                <specificCapacitance segmentGroup="dend9_116__grp" value="1.050524 uF_per_cm2"/>

                <specificCapacitance segmentGroup="dend9_117__grp" value="1.050524 uF_per_cm2"/>

                <specificCapacitance segmentGroup="dend9_96__grp" value="1.050524 uF_per_cm2"/>

                <specificCapacitance segmentGroup="dend9_97__grp" value="1.050524 uF_per_cm2"/>

                <specificCapacitance segmentGroup="dend9_98__grp" value="1.050524 uF_per_cm2"/>

                <specificCapacitance segmentGroup="dend9_99__grp" value="1.050524 uF_per_cm2"/>

                <specificCapacitance segmentGroup="dend8_1__grp" value="1.052922 uF_per_cm2"/>

                <specificCapacitance segmentGroup="dend9_106__grp" value="1.055283 uF_per_cm2"/>

                <specificCapacitance segmentGroup="dend4_0__grp" value="1.055981 uF_per_cm2"/>

                <specificCapacitance segmentGroup="dend9_102__grp" value="1.056781 uF_per_cm2"/>

                <specificCapacitance segmentGroup="dend9_62__grp" value="1.058067 uF_per_cm2"/>

                <specificCapacitance segmentGroup="dend6_20__grp" value="1.059303 uF_per_cm2"/>

                <specificCapacitance segmentGroup="dend9_5__grp" value="1.060614 uF_per_cm2"/>

                <specificCapacitance segmentGroup="dend6_17__grp" value="1.06287 uF_per_cm2"/>

                <specificCapacitance segmentGroup="dend3_1__grp" value="1.063161 uF_per_cm2"/>

                <specificCapacitance segmentGroup="dend2_11__grp" value="1.064835 uF_per_cm2"/>

                <specificCapacitance segmentGroup="dend2_1__grp" value="1.064835 uF_per_cm2"/>

                <specificCapacitance segmentGroup="dend2_9__grp" value="1.064835 uF_per_cm2"/>

                <specificCapacitance segmentGroup="dend3_12__grp" value="1.065029 uF_per_cm2"/>

                <specificCapacitance segmentGroup="dend2_6__grp" value="1.065318 uF_per_cm2"/>

                <specificCapacitance segmentGroup="dend2_21__grp" value="1.067441 uF_per_cm2"/>

                <specificCapacitance segmentGroup="dend9_41__grp" value="1.069345 uF_per_cm2"/>

                <specificCapacitance segmentGroup="dend9_2__grp" value="1.07127 uF_per_cm2"/>

                <specificCapacitance segmentGroup="dend3_2__grp" value="1.072404 uF_per_cm2"/>

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                <specificCapacitance segmentGroup="dend9_76__grp" value="1.353843 uF_per_cm2"/>-->

                <specificCapacitance segmentGroup="myelin_group" value="0.04 uF_per_cm2"/>

                <specificCapacitance segmentGroup="axon_start" value="0.75 uF_per_cm2"/>

                <specificCapacitance segmentGroup="nodes" value="0.75 uF_per_cm2"/>

                <specificCapacitance segmentGroup="soma_group" value="0.75 uF_per_cm2"/>

                <!--<specificCapacitance segmentGroup="dend9_78__grp" value="0.8629101 uF_per_cm2"/>

                <specificCapacitance segmentGroup="dend6_0__grp" value="0.8719907 uF_per_cm2"/>

                <specificCapacitance segmentGroup="dend9_84__grp" value="0.8816352 uF_per_cm2"/>

                <specificCapacitance segmentGroup="dend9_9__grp" value="0.885988 uF_per_cm2"/>

                <specificCapacitance segmentGroup="dend9_1__grp" value="0.8911495 uF_per_cm2"/>

                <specificCapacitance segmentGroup="dend9_0__grp" value="0.8912952 uF_per_cm2"/>

                <specificCapacitance segmentGroup="dend9_77__grp" value="0.9121084 uF_per_cm2"/>

                <specificCapacitance segmentGroup="dend3_0__grp" value="0.9200284 uF_per_cm2"/>

                <specificCapacitance segmentGroup="dend9_88__grp" value="0.9218308 uF_per_cm2"/>

                <specificCapacitance segmentGroup="dend9_8__grp" value="0.923172 uF_per_cm2"/>

                <specificCapacitance segmentGroup="dend2_0__grp" value="0.9236614 uF_per_cm2"/>

                <specificCapacitance segmentGroup="dend9_79__grp" value="0.9352678 uF_per_cm2"/>

                <specificCapacitance segmentGroup="dend9_94__grp" value="0.9370562 uF_per_cm2"/>

                <specificCapacitance segmentGroup="dend8_0__grp" value="0.9394683 uF_per_cm2"/>

                <specificCapacitance segmentGroup="dend9_100__grp" value="0.9503496 uF_per_cm2"/>

                <specificCapacitance segmentGroup="dend9_39__grp" value="0.9508066 uF_per_cm2"/>

                <specificCapacitance segmentGroup="dend9_57__grp" value="0.9608357 uF_per_cm2"/>

                <specificCapacitance segmentGroup="dend9_24__grp" value="0.966235 uF_per_cm2"/>

                <specificCapacitance segmentGroup="dend9_108__grp" value="0.9731902 uF_per_cm2"/>

                <specificCapacitance segmentGroup="dend9_85__grp" value="0.9733419 uF_per_cm2"/>

                <specificCapacitance segmentGroup="dend9_118__grp" value="0.9753932 uF_per_cm2"/>

                <specificCapacitance segmentGroup="dend9_81__grp" value="0.9772482 uF_per_cm2"/>

                <specificCapacitance segmentGroup="dend9_89__grp" value="0.9877796 uF_per_cm2"/>

                <specificCapacitance segmentGroup="dend9_109__grp" value="0.9883483 uF_per_cm2"/>-->

                <initMembPotential value="-70.0 mV"/>

            </membraneProperties>

            <intracellularProperties>

                <resistivity value="0.2 kohm_cm"/>

            </intracellularProperties>

        </biophysicalProperties>

    </cell>

</neuroml>
